# Title: End Bent 1 Backwall, Cheek Walls and Tie-Back Straps
# Description: Written by scripts/build_backwall_mathcad.py from the D2MPDB end_bent_walls notebook (package 4f877bd2c240).
## End Bent 1 — Backwall, Cheek Walls and Tie-Back Straps
# Project: D2 I-95 Pedestrian Bridge · common end-bent design (D-004).
# Mathcad edition of End_Bent_Backwall_Design.ipynb (calculation package 4f877bd2c240). Same inputs, equations and load combinations as the notebook; results should match its exported report (Section 12 lists the notebook values).
# Codes: AASHTO LRFD Bridge Design Specifications, 10th edition (2024); FDOT Structures Design Guidelines (SDG) and Structures Detailing Manual (SDM), January 2026.
# Status: adopted CAD geometry reconciled 19 October 2026 (D-053 backwall tops, D-055 model; D-049 analysis export); single centered #4 cheek mat at 10 in each way. Prerequisites remain pending (Section 12). Inputs are highlighted yellow; values for the plans are boxed.
## 1. Design basis
# • Tie-back straps in the backwall extend into the MSE fill and resist the end-bent horizontal load and overturning (D-014). Attachment requires total settlement of the soil above the cap bottom of 2 in or less (SDG 3.13.2.N.3).
# • The single pile row is effectively pinned (FBMP fixity 0.10), so moments are taken about the pile top O. The strap force is F = max(H, M / y_strap); the piles supply M / y_strap − H at O.
# • Vertical-load arms are measured from the pile line shifted 3 in toward the fill (placement tolerance, SDG 3.13.2.N.3). Permanent loads take the maximum factor on an overturning arm and the minimum on a stabilizing arm; live load and wind uplift take no stabilizing credit.
# • Pedestrian load only (D-015): 90 psf live-load surcharge. Backfill φ = 30°, δ = 0, γ = 115 pcf, active Coulomb pressure (D-016).
# • The landing slab bears on the backwall (D-017): 50 % of its load goes to gravity design with no stabilizing credit; its weight on the fill acts as an earth surcharge ES.
# • The cheek walls retain no fill: wind only (D-018). The backwall is designed at the crown height with the strap 1.5 ft above the cap top (D-019).
# • Backwall states: strap slack, soil causes fill-face tension; strap engaged, the strap pull causes span-face tension. Both are designed.
## 2. Inputs
## Adopted CAD geometry and centered cheek mat
single_ck := 1
# Cheek layout: 1 = centered tangent mat; 0 = legacy two faces
L_load := 251*in  # Full end-bent width loaded by soil and surcharge (cap plus outboard cheeks)
V_cap := 196.625*ft^3
# Cap net concrete volume (0 = rectangular gross estimate)
V_bw := 77.7698118413*ft^3  # Backwall net concrete volume (minimum stabilizing weight; 0 = prism estimate)
V_ck := 42.9824009974*ft^3
# Both cheek walls net volume, including lugs (0 = web-only estimate)
dx_ck := (-2.18275266261)*in  # Cheek centroid offset toward span from nominal pile line
## Geometry (D-053/D-055 native CAD snapshot)
b_cap := 42*in
# Cap width along the bridge
h_cap := 36*in  # Cap depth
L_cap := 235*in
# Cap length transverse to the bridge
embed_pile := 12*in  # Pile embedment into the cap (pile top above cap soffit)
tol_pile := 3*in
# Pile placement tolerance applied toward the fill (destabilizing)
t_bw := 12*in  # Backwall thickness (rear face flush with cap rear face)
L_bw := 235*in
# Backwall length between cheek walls
H_bw := 4.0691411893*ft  # Backwall design height at the crown (maximum)
H_bw.edge := 3.87330776778*ft
# Backwall height at the cheek walls (2% cross slope)
e_brg := 3*in  # Bearing centerline offset from the pile line toward the span
s_brg := 102.99*in
# Bearing (beam) spacing along the cap
h_ped := 6*in  # Pedestal height at seat center
L_ped := 30*in
# Pedestal length along the beam
B_ped := 42*in  # Pedestal width transverse to the beam
t_pad := 2.5625*in
# Type F bearing pad total thickness
t_ck := 8*in  # Cheek wall thickness
w_ck := 42*in
# Cheek wall length along the bridge
H_ck := 5.03135252388*ft  # Cheek wall height above the cap top
## Soil and surcharge (D-015, D-016, D-017)
ϕ_soil := 30*deg
# Backfill internal friction angle
δ_w := 0*deg  # Wall friction angle (neglected)
θ_w := 90*deg
# Back face angle from horizontal
β_f := 0*deg  # Backfill surface slope
γ_s := 0.115*kip/ft^3
# Backfill unit weight
q_PL := 0.09*kip/ft^2  # Pedestrian live load used as live-load surcharge
t_slab := 4*in
# Landing slab thickness (bears on backwall top)
L_slab := 17.1554607526*ft  # Equivalent landing tributary length (verified slab area / backwall length)
share_slab := 0.5  # Share of landing slab load carried by the backwall (gravity design only)
## Bearings and superstructure (EB-XML End Bent 1_Fixed, D-049; journal pad data)
N_brg := 2
# Bearings at the end bent
P_DC := 92.07*kip  # DC reaction per bearing
P_PL := 28.98*kip
# Pedestrian live load reaction per bearing
FY_WS1 := 3.29*kip  # Longitudinal wind per bearing, Strength III direction 1
FZ_WS1 := (-36.98)*kip
# Vertical wind, both bearings (+ down), Strength III direction 1
FY_WS2 := 0*kip  # Longitudinal wind per bearing, Strength III direction 2
FZ_WS2 := (-14.58)*kip
# Vertical wind, both bearings (+ down), Strength III direction 2
FY_WS3 := 1.63*kip  # Longitudinal wind per bearing, Service I
FZ_WS3 := 0*kip
# Vertical wind, both bearings (+ down), Service I
G_pad := 0.11*ksi  # Type F elastomer shear modulus
G_fac := 1.15
# Upper-bound shear modulus factor
L_pad := 10*in  # Pad length along the beam
W_pad := 32*in
# Pad width transverse to the beam
n_int := 3  # Internal elastomer layers
t_int := 0.5*in
# Internal elastomer layer thickness
t_cov := 0.25*in  # Top and bottom cover layer thickness
α_t := 6e-6
# Coefficient of thermal expansion (per °F)
Δ_T := 35  # Temperature fall from 70 °F mean (°F)
L_exp := 107.35*ft
# Expansion length to the movement center at the pier
ε_sh := 7.3e-5  # Beam shrinkage strain after bearing seating
## Tie-back strap and cheek-wall wind
z_strap := 1.5*ft
# Tie-back strap elevation above the cap top
V_III := 130  # Strength III design wind speed (mph)
V_SER := 70
# Service I wind speed (mph)
K_Z.III := 1.02  # Strength III pressure exposure and elevation coefficient
K_Z.SER := 1
# Service I pressure exposure and elevation coefficient
G_w := 0.85  # Gust effect factor
C_D := 1.6  # Drag coefficient, substructure
## Reinforcement (trial) and cover (SDG Table 1.4.2-1)
cv_bw := 3*in
# Backwall clear cover, both faces
cv_ck := 2*in  # Cheek wall clear cover, both faces
bar_FF := 5
# Backwall vertical bar · fill face
s_FF := 12*in  # Backwall vertical spacing · fill face
bar_SF := 5
# Backwall vertical bar · span face
s_SF := 12*in  # Backwall vertical spacing · span face
bar_HZ := 4
# Backwall horizontal bar · each face
s_HZ := 12*in  # Backwall horizontal spacing · each face
bar_CK := 4
# Cheek wall vertical bar · single mat
s_CK := 10*in  # Cheek wall vertical spacing · single mat
bar_CKH := 4
# Cheek wall horizontal bar · single mat
s_CKH := 10*in  # Cheek wall horizontal spacing · single mat
## Materials and resistance factors
f'_c := 5.5*ksi
# Concrete compressive strength
f_y := 60*ksi  # Reinforcement yield strength (A615 Grade 60)
E_s := 29000*ksi
# Reinforcement modulus
w_c := 0.15*kip/ft^3  # Reinforced concrete unit weight
w_cE := 0.1455*kip/ft^3
# Plain concrete unit weight for the elastic modulus
K_1 := 1  # Aggregate correction factor
λ_c := 1
# Concrete density modification factor
ϕ_f := 0.9  # Flexural resistance factor (tension controlled)
ϕ_v := 0.9
# Shear resistance factor
γ_e := 1  # Crack-control exposure factor (Class 1)
fss_ratio := 0.8
# Service stress limit as a fraction of fy
γ_1 := 1.6  # Flexural cracking variability factor
γ_3 := 0.67
# Yield-to-ultimate ratio factor (A615 Grade 60)
β_v := 2  # Simplified shear β (overall depth below 16 in)
c_if := 0.075*ksi
# Interface cohesion, clean joint not intentionally roughened
μ_if := 0.6  # Interface friction factor
K1_if := 0.2
# Interface strength fraction K1
K2_if := 0.8*ksi  # Interface limiting stress K2
A_bar := transpose([0, 0, 0, 0.11, 0.2, 0.31, 0.44, 0.6, 0.79, 1, 1.27, 1.56])*in^2
# bar area; index = bar number
d_bar := transpose([0, 0, 0, 0.375, 0.5, 0.625, 0.75, 0.875, 1, 1.128, 1.27, 1.41])*in
# bar diameter; index = bar number
## 3. Geometry and overturning arms
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# Figure 1. End-bent section. Arms are measured from O, the pile top on the pile line shifted 3 in toward the fill; x is positive toward the span and y is the height above O.
b_s := 12*in  # design strip width
y_top := h_cap - embed_pile  # cap top above O
H_ret := H_bw + h_cap  # retained height, soffit to crown
H_bw.avg := if(V_bw > 0*ft^3, V_bw/(t_bw*L_bw), (H_bw + H_bw.edge)/2)
# average backwall height
y_brg := y_top + h_ped + t_pad  # top of pad above O
y_strap := y_top + z_strap  # strap above O
x_brg := e_brg + tol_pile  # bearing arm
x_cap := tol_pile  # cap arm (cap centered on nominal pile)
x_ped := t_bw + L_ped/2 - b_cap/2 + tol_pile  # pedestal arm
x_ck := dx_ck + tol_pile  # cheek wall arm
x_bw := t_bw/2 - b_cap/2 + tol_pile  # backwall arm (negative = stabilizing)
## 4. Loads
## 4.1 Earth pressure and surcharges (LRFD 3.11.5.3 Coulomb; 3.11.6.1 uniform surcharge)
Γ_c := (1 + sqrt(sin(ϕ_soil + δ_w)*sin(ϕ_soil - β_f)/(sin(θ_w - δ_w)*sin(θ_w + β_f))))^2  # Coulomb Γ
k_a := sin(θ_w + ϕ_soil)^2/(Γ_c*sin(θ_w)^2*sin(θ_w - δ_w))  # active pressure coefficient
p_EH := k_a*γ_s*H_ret  # EH pressure at the cap soffit
F_EH := 0.5*k_a*γ_s*H_ret^2*L_load  # EH resultant
y_EH := H_ret/3 - embed_pile  # EH height above O
p_LS := k_a*q_PL  # pedestrian surcharge pressure
F_LS := p_LS*H_ret*L_load  # LS resultant
y_LS := H_ret/2 - embed_pile  # LS height above O
q_ES := t_slab*w_c  # landing slab weight on the fill
p_ES := k_a*q_ES  # slab surcharge pressure
F_ES := p_ES*H_ret*L_load  # ES resultant
y_ES := H_ret/2 - embed_pile  # ES height above O
## 4.2 Bearing and superstructure actions (FBMP reactions; LRFD 14.6.3.1 pad shear with upper-bound G)
A_pad := L_pad*W_pad  # pad plan area
h_rt := n_int*t_int + 2*t_cov  # elastomer thickness
K_pad := G_fac*G_pad*A_pad/h_rt  # pad shear stiffness
Δ_TU := α_t*Δ_T*L_exp  # temperature fall shortening
F_TU := N_brg*K_pad*Δ_TU  # pad shear, toward the span
Δ_SH := ε_sh*L_exp  # shrinkage shortening
F_SH := N_brg*K_pad*Δ_SH  # pad shear, toward the span
W_DCb := N_brg*P_DC  # superstructure DC
W_PLb := N_brg*P_PL  # pedestrian load
H_WS1 := N_brg*FY_WS1  # longitudinal wind, Strength III dir. 1
H_WS2 := N_brg*FY_WS2  # longitudinal wind, Strength III dir. 2
H_WS3 := N_brg*FY_WS3  # longitudinal wind, Service I
## 4.3 Dead loads
W_cap := if(V_cap > 0*ft^3, V_cap, b_cap*h_cap*L_cap)*w_c
# cap
W_ped := N_brg*L_ped*B_ped*h_ped*w_c  # pedestals
W_bw := t_bw*H_bw.avg*L_bw*w_c  # backwall
W_ck := if(V_ck > 0*ft^3, V_ck, 2*t_ck*w_ck*H_ck)*w_c  # cheek walls, both
w_sl.DC := share_slab*L_slab*t_slab*w_c  # slab DC on the backwall (gravity only)
w_sl.PL := share_slab*L_slab*q_PL  # slab PL on the backwall (gravity only)
## 5. Overturning about the pile top and tie-back force
# Vectors hold the five combinations in this order: Service I, Strength I, Strength III wind 1, Strength III wind 2, Strength IV (LRFD Tables 3.4.1-1 and 3.4.1-2). TU and SH share one factor. Wind takes γWS = 1.0 where it applies; vertical wind counts only when it increases overturning.
i := 0 .. 4
Combo := transpose(["Service I", "Strength I", "Strength III-1", "Strength III-2", "Strength IV"])
γ_EH := transpose([1, 1.5, 1.5, 1.5, 1.5])
γ_ES := transpose([1, 1.5, 1.5, 1.5, 1.5])
γ_LS := transpose([1, 1.75, 0, 0, 0])
γ_TU := transpose([1, 0.5, 0.5, 0.5, 0.5])
γ_DCmax := transpose([1, 1.25, 1.25, 1.25, 1.5])
γ_DCmin := transpose([1, 0.9, 0.9, 0.9, 0.9])
γ_PL := transpose([1, 1.75, 0, 0, 0])
H_W := transpose([H_WS3, 0*kip, H_WS1, H_WS2, 0*kip])  # longitudinal wind in each combination
FZ_W := transpose([FZ_WS3, 0*kip, FZ_WS1, FZ_WS2, 0*kip])  # vertical wind in each combination (+ down)
# Factor on each vertical load, chosen by the sign of its arm:
γ_brg := if(x_brg > 0*in, γ_DCmax, γ_DCmin)
γ_cap := if(x_cap > 0*in, γ_DCmax, γ_DCmin)
γ_ped := if(x_ped > 0*in, γ_DCmax, γ_DCmin)
γ_ck := if(x_ck > 0*in, γ_DCmax, γ_DCmin)
γ_bw := if(x_bw > 0*in, γ_DCmax, γ_DCmin)
γ_PLb := if(x_brg > 0*in, γ_PL, 0*γ_PL)
M_WV[i] := if(FZ_W[i]*x_brg > 0*kip*in, FZ_W[i]*x_brg, 0*kip*in)
transpose(M_WV) =  # no stored result  # vertical wind, overturning only
transpose(Combo) =  # no stored result
H_T := γ_EH*F_EH + γ_ES*F_ES + γ_LS*F_LS + γ_TU*(F_TU + F_SH) + H_W
transpose(H_T) =  # no stored result  # horizontal force toward the span
M_H := γ_EH*F_EH*y_EH + γ_ES*F_ES*y_ES + γ_LS*F_LS*y_LS + (γ_TU*(F_TU + F_SH) + H_W)*y_brg
transpose(M_H) =  # no stored result  # moment of the horizontal loads about O
M_Vb := γ_brg*W_DCb*x_brg + γ_PLb*W_PLb*x_brg + γ_ped*W_ped*x_ped
transpose(M_Vb) =  # no stored result  # superstructure and pedestals
M_Vs := γ_cap*W_cap*x_cap + γ_ck*W_ck*x_ck + γ_bw*W_bw*x_bw
transpose(M_Vs) =  # no stored result  # cap, cheek walls and backwall
M_OT := M_H + M_Vb + M_Vs + M_WV
transpose(M_OT) =  # no stored result  # overturning moment about O
e_res[i] := M_OT[i]/H_T[i]
transpose(e_res) =  # no stored result
# resultant height above O
F_eq := M_OT/y_strap
transpose(F_eq) =  # no stored result  # strap force for moment equilibrium
F_str[i] := max(H_T[i], F_eq[i])
transpose(F_str) =  # no stored result
# design strap force
f_str := F_str/L_bw
transpose(f_str) =  # no stored result  # strap load per foot of backwall
V_pile := F_eq - H_T
transpose(V_pile) =  # no stored result  # pile-head force at O (+ toward span)
f_str.u := max(f_str[1], f_str[2], f_str[3], f_str[4])  # factored strap load for the plans
f_str.s := f_str[0]  # service strap load for the plans
F_str.u := f_str.u*L_bw  # factored, whole backwall
F_str.s := f_str.s*L_bw  # service, whole backwall
## 6. Backwall demands per 1-ft strip
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# Figure 2. Backwall strip above the construction joint. Strap slack: the soil bends the wall toward the span (fill-face tension). Strap engaged: the strap pull exceeds the soil moment (span-face tension).
V_EH.bw := 0.5*k_a*γ_s*H_bw^2*b_s  # earth pressure on the strip
M_EH.bw := V_EH.bw*H_bw/3  # EH moment at the joint
V_LS.bw := p_LS*H_bw*b_s  # pedestrian surcharge
M_LS.bw := V_LS.bw*H_bw/2  # LS moment at the joint
V_ES.bw := p_ES*H_bw*b_s  # slab surcharge
M_ES.bw := V_ES.bw*H_bw/2  # ES moment at the joint
M_sl := γ_EH*M_EH.bw + γ_ES*M_ES.bw + γ_LS*M_LS.bw
transpose(M_sl) =  # no stored result  # strap slack: moment, fill-face tension
V_sl := γ_EH*V_EH.bw + γ_ES*V_ES.bw + γ_LS*V_LS.bw
transpose(V_sl) =  # no stored result  # strap slack: joint shear
M_en := f_str*b_s*z_strap - M_sl
transpose(M_en) =  # no stored result  # strap engaged: moment, span-face tension
V_en := f_str*b_s - V_sl
transpose(V_en) =  # no stored result  # strap engaged: joint shear
M_u.FF := max(M_sl[1], M_sl[2], M_sl[3], M_sl[4])  # factored moment, fill face
M_s.FF := M_sl[0]  # service moment, fill face
M_u.SF := max(M_en[1], M_en[2], M_en[3], M_en[4], 0*kip*ft)  # factored moment, span face
M_s.SF := max(M_en[0], 0*kip*ft)  # service moment, span face
V_u.bw := max(V_sl[1], V_sl[2], V_sl[3], V_sl[4], |V_en[1]|, |V_en[2]|, |V_en[3]|, |V_en[4]|)
# factored joint shear, both states
## 7. Cheek walls: wind only (D-018; LRFD 3.8.1.2.1)
P_Z.III := 2.56*10^-6*V_III^2*K_Z.III*G_w*C_D*ksf  # Strength III pressure
P_Z.SER := 2.56*10^-6*V_SER^2*K_Z.SER*G_w*C_D*ksf  # Service I pressure
V_u.CK := P_Z.III*H_ck*b_s  # factored base shear, 1-ft strip
M_u.CK := P_Z.III*H_ck^2/2*b_s  # factored base moment
M_s.CK := P_Z.SER*H_ck^2/2*b_s  # service base moment
## 8. Materials (LRFD 5.4.2, 5.6.2.2; SDG 3.10.F)
β_1 := min(0.85, max(0.65, 0.85 - 0.05*(f'_c - 4*ksi)/ksi))
# stress block factor
E_c := 120000*K_1*(w_cE/(kip/ft^3))^2*(f'_c/ksi)^0.33*ksi  # concrete modulus
n_m := E_s/E_c  # modular ratio
f_r := 0.24*λ_c*sqrt(f'_c/ksi)*ksi  # modulus of rupture
f_ss.lim := fss_ratio*f_y  # service steel stress limit
## 9. Flexure, crack control and shear: 1-ft strips (LRFD 5.6, 5.7)
# Index j: 0 = backwall fill face (strap slack), 1 = backwall span face (strap engaged), 2 = cheek wall (either face).
j := 0 .. 2
Member := transpose(["Backwall fill face", "Backwall span face", "Cheek wall"])
h_w := transpose([t_bw, t_bw, t_ck])
c_v := transpose([cv_bw, cv_bw, cv_ck])
n_b := transpose([bar_FF, bar_SF, bar_CK])
s_w := transpose([s_FF, s_SF, s_CK])
M_u := transpose([M_u.FF, M_u.SF, M_u.CK])
M_s := transpose([M_s.FF, M_s.SF, M_s.CK])
A_b[j] := A_bar[n_b[j]]
transpose(A_b) =  # no stored result
# bar area
d_b[j] := d_bar[n_b[j]]
transpose(d_b) =  # no stored result
# bar diameter
d[j] := if(j == 2, if(single_ck == 1, t_ck/2 - d_bar[bar_CKH]/2, h_w[j] - c_v[j] - d_b[j]/2), h_w[j] - c_v[j] - d_b[j]/2)
transpose(d) =  # no stored result  # effective depth
A_s[j] := A_b[j]*b_s/s_w[j]
transpose(A_s) =  # no stored result
# steel in the strip
a[j] := A_s[j]*f_y/(0.85*f'_c*b_s)
transpose(a) =  # no stored result
# stress block depth
c[j] := a[j]/β_1
transpose(c) =  # no stored result
# neutral axis depth
ε_t[j] := 0.003*(d[j] - c[j])/c[j]
transpose(ε_t) =  # no stored result
# net tensile strain
ϕ[j] := if(ε_t[j] ≥ 0.005, ϕ_f, if(ε_t[j] ≤ 0.002, 0.75, 0.75 + 0.15*(ε_t[j] - 0.002)/0.003))
transpose(ϕ) =  # no stored result  # flexure φ (LRFD 5.5.4.2)
M_n[j] := A_s[j]*f_y*(d[j] - a[j]/2)
transpose(M_n) =  # no stored result  # nominal moment
M_r[j] := ϕ[j]*M_n[j]
transpose(M_r) =  # no stored result
# factored resistance
A_req[j] := 0.85*f'_c*b_s*d[j]/f_y*(1 - sqrt(max(1 - 2*M_u[j]/(0.85*ϕ_f*f'_c*b_s*d[j]^2), 0)))
transpose(A_req) =  # no stored result  # steel required for Mu
S_c[j] := b_s*h_w[j]^2/6
transpose(S_c) =  # no stored result
# section modulus
M_cr[j] := γ_3*γ_1*f_r*S_c[j]
transpose(M_cr) =  # no stored result
# cracking moment (LRFD 5.6.3.3)
M_min[j] := min(M_cr[j], 1.33*M_u[j])
transpose(M_min) =  # no stored result  # minimum flexural resistance
ρ[j] := A_s[j]/(b_s*d[j])
transpose(ρ) =  # no stored result
# reinforcement ratio
k_cr[j] := sqrt(2*ρ[j]*n_m + (ρ[j]*n_m)^2) - ρ[j]*n_m
transpose(k_cr) =  # no stored result  # cracked neutral axis ratio
j_cr[j] := 1 - k_cr[j]/3
transpose(j_cr) =  # no stored result
# lever arm ratio
f_ss[j] := M_s[j]/(A_s[j]*j_cr[j]*d[j])
transpose(f_ss) =  # no stored result
# service steel stress
d_c[j] := h_w[j] - d[j]
transpose(d_c) =  # no stored result
# cover to bar center
β_s[j] := 1 + d_c[j]/(0.7*(h_w[j] - d_c[j]))
transpose(β_s) =  # no stored result  # strain ratio
s_cr[j] := if(f_ss[j] > 0*ksi, 700*γ_e/(β_s[j]*f_ss[j]/ksi)*in - 2*d_c[j], 99*in)
transpose(s_cr) =  # no stored result  # crack-control spacing (LRFD 5.6.7)
d_v[j] := max(d[j] - a[j]/2, 0.9*d[j], 0.72*h_w[j])
transpose(d_v) =  # no stored result  # shear depth
V_c[j] := 0.0316*β_v*λ_c*sqrt(f'_c/ksi)*ksi*b_s*d_v[j]
transpose(V_c) =  # no stored result  # concrete shear
V_n[j] := min(V_c[j], 0.25*f'_c*b_s*d_v[j])
transpose(V_n) =  # no stored result  # nominal shear
V_r[j] := ϕ_v*V_n[j]
transpose(V_r) =  # no stored result
# factored shear resistance
## 10. Construction joints and distribution steel (LRFD 5.7.4, 5.10.3.2, 5.10.6; SDG 1.15)
V_r.bw := min(V_r[0], V_r[1])  # backwall shear resistance
A_cv.bw := min(d_v[0], d_v[1])*b_s  # interface area, dv strip
A_vf.bw := min(A_s[0], A_s[1])  # steel across the joint, one face
V_ni.bw := min(c_if*A_cv.bw + μ_if*A_vf.bw*f_y, K1_if*f'_c*A_cv.bw, K2_if*A_cv.bw)
# nominal interface shear, Pc = 0
V_ri.bw := ϕ_v*V_ni.bw  # factored interface shear
A_vfmin.bw := 0.05*ksi*A_cv.bw/f_y  # minimum interface steel
A_cv.ck := d_v[2]*b_s  # cheek wall interface area
V_ni.ck := min(c_if*A_cv.ck + μ_if*A_s[2]*f_y, K1_if*f'_c*A_cv.ck, K2_if*A_cv.ck)
# cheek wall interface shear
V_ri.ck := ϕ_v*V_ni.ck  # factored
s_max.bw := min(1.5*t_bw, 18*in)  # max primary spacing, backwall
s_max.ck := min(1.5*t_ck, 18*in)  # max primary spacing, cheek wall
b_ts.bw := min(H_bw, L_bw)  # least backwall width
A_ts0.bw := 1.3*b_ts.bw*t_bw/(2*(b_ts.bw + t_bw)*f_y)*ksi*in/ft  # LRFD 5.10.6-1 (b, h in in, fy in ksi)
A_ts.bw := min(max(A_ts0.bw, 0.11*in^2/ft), 0.6*in^2/ft)
# S&T steel each backwall face, 0.11 to 0.60
s_ts.bw := min(3*t_bw, 18*in)  # max S&T spacing
b_ts.ck := min(H_ck, w_ck)  # least cheek wall width
A_ts0.ck := 1.3*b_ts.ck*t_ck/(2*(b_ts.ck + t_ck)*f_y)*ksi*in/ft  # LRFD 5.10.6-1
A_ts.ck := if(single_ck == 1, 2, 1)*min(max(A_ts0.ck, 0.11*in^2/ft), 0.6*in^2/ft)
# S&T steel, both face requirements combined for the single cheek mat
s_ts.ck := min(3*t_ck, 18*in)  # max S&T spacing
A_pr.FF := A_b[0]/s_FF  # provided, fill face
A_pr.SF := A_b[1]/s_SF  # provided, span face
A_pr.HZ := A_bar[bar_HZ]/s_HZ  # provided, backwall horizontal
A_pr.CK := A_b[2]/s_CK  # provided, cheek vertical
A_pr.CKH := A_bar[bar_CKH]/s_CKH  # provided, cheek horizontal
## 11. Cap torsion screen (LRFD 5.7.2.1; not in the FBMP cap model)
# The strap restraint is spread along the backwall and balances the overturning moment, so the torque along the cap closes to zero at both ends. Uniform torques: soil and cap self-weight over the cap length, backwall and strap over the backwall length. Point torques: bearing-level loads at the two bearings, cheek walls at the cap ends.
A_cp := b_cap*h_cap  # cap gross area
p_cp := 2*(b_cap + h_cap)  # cap perimeter
T_cr := 0.126*sqrt(f'_c/ksi)*ksi*A_cp^2/p_cp  # cracking torque
T_lim := 0.25*ϕ_v*T_cr  # torsion may be neglected below this
t_u := (γ_EH*F_EH*y_EH + γ_ES*F_ES*y_ES + γ_LS*F_LS*y_LS)/L_load  # uniform torque, whole cap
t_cap := γ_cap*W_cap*x_cap/L_cap  # uniform torque over the core cap only
t_b := (γ_bw*W_bw*x_bw - M_OT)/L_bw  # uniform torque over the backwall, with the strap
P_b := ((γ_TU*(F_TU + F_SH) + H_W)*y_brg + M_Vb + M_WV)/N_brg  # torque at each bearing
P_c := γ_ck*W_ck*x_ck/2  # torque at each cheek wall
x_w0 := (L_load - L_bw)/2  # backwall start
x_b1 := (L_load - s_brg)/2  # bearing 1
x_b2 := (L_load + s_brg)/2  # bearing 2
L_core(x) := min(max(x - (L_load - L_cap)/2, 0*in), L_cap)  # core cap length left of x
L_w(x) := min(max(x - x_w0, 0*in), L_bw)  # backwall length left of x
N_b(x) := if(x ≥ x_b1, 1, 0) + if(x ≥ x_b2, 1, 0)  # bearings at or left of x
N_c(x) := if(x ≥ t_ck/2, 1, 0) + if(x ≥ L_load - t_ck/2, 1, 0)  # cheek walls at or left of x
T_c(x, r) := t_u[r]*x + t_cap[r]*L_core(x) + t_b[r]*L_w(x) + P_b[r]*N_b(x) + P_c[r]*N_c(x)
# torque at x, combination r
X_T := transpose([0*in, t_ck/2, x_w0, x_b1, x_b2, L_load - x_w0, L_load - t_ck/2, L_load])
# stations where the torque changes slope or jumps
k := 0 .. 7
r := 1 .. 4
T_A[k, r] := |T_c(X_T[k], r)|  # torque at each station
T_B[k, r] := |T_c(X_T[k] - 0.001*in, r)|  # torque just before each station
T_u := max(T_A, T_B)  # largest factored torque, strength combinations
## 12. Summary of checks
# Demand / capacity ratios; 1.0 or less passes. Rows j as in Section 9.
s_max := transpose([s_max.bw, s_max.bw, s_max.ck])  # maximum spacing for each strip
transpose(Member) =  # no stored result
DC_flex[j] := M_u[j]/M_r[j]
transpose(DC_flex) =  # no stored result
# flexure, Mu / φMn
DC_min[j] := M_min[j]/M_r[j]
transpose(DC_min) =  # no stored result
# minimum steel, min(Mcr, 1.33Mu) / φMn
DC_eps[j] := 0.005/ε_t[j]
transpose(DC_eps) =  # no stored result
# tension-controlled, 0.005 / εt
DC_crk[j] := max(f_ss[j]/f_ss.lim, if(f_ss[j] > 0*ksi, s_w[j]/s_cr[j], 0))
transpose(DC_crk) =  # no stored result  # crack control, max(fss / 0.8fy, s / s_cr)
DC_sp[j] := s_w[j]/s_max[j]
transpose(DC_sp) =  # no stored result
# maximum bar spacing
DC_V.bw := V_u.bw/V_r.bw  # backwall shear
DC_Vi.bw := V_u.bw/V_ri.bw  # backwall interface shear (SDG 1.15)
DC_Avf := A_vfmin.bw/A_vf.bw  # minimum interface steel
DC_ts.v := max(A_ts.bw/min(A_pr.FF, A_pr.SF), max(s_FF, s_SF)/s_ts.bw)  # backwall S&T, vertical
DC_ts.h := max(A_ts.bw/A_pr.HZ, s_HZ/s_ts.bw)  # backwall S&T, horizontal
DC_V.ck := V_u.CK/V_r[2]  # cheek wall shear
DC_Vi.ck := V_u.CK/V_ri.ck  # cheek wall interface shear
DC_ts.ck := max(A_ts.ck/min(A_pr.CK, A_pr.CKH), max(s_CK, s_CKH)/s_ts.ck)  # cheek wall S&T
DC_cov := max(3*in/cv_bw, if(single_ck == 1, cv_ck, 2*in)/if(single_ck == 1, (t_ck - d_bar[bar_CK] - d_bar[bar_CKH])/2, cv_ck))
# cover, 3 in backwall and specified cheek requirement (legacy minimum 2 in)
DC_thk := max(12*in/t_bw, 8*in/t_ck)  # thickness, SDM 12.6.B
DC_strap := z_strap/H_bw.edge  # strap within the backwall height
DC_T := T_u/T_lim  # cap torsion screen
DC_strips := max(DC_flex, DC_min, DC_eps, DC_crk, DC_sp)  # largest strip ratio
DC_joints := max(DC_V.bw, DC_Vi.bw, DC_Avf, DC_ts.v, DC_ts.h, DC_V.ck, DC_Vi.ck, DC_ts.ck)
# largest joint and S&T ratio
DC_max := max(DC_strips, DC_joints, DC_cov, DC_thk, DC_strap, DC_T)
# largest ratio
Status := if(DC_max ≤ 1, "PASS", "FAIL")
# all numerical checks
## Tie-back loads for the plans (SDM 12.3.F)
f_str.s =  # no stored result  # service load per foot of backwall
f_str.u =  # no stored result  # factored load per foot of backwall
# Plan note (SDM 12.3.F): "The soil reinforcement attached to the backwall shall be designed by a Specialty Engineer for the service and factored loads as shown using the design criteria for permanent MSE walls. Cost of furnishing and installing the soil reinforcement is considered incidental to the cost of the end bent." Also add the SDG 1.15 note requiring the construction joints to be intentionally roughened to a 1/4 in amplitude.
# Pending before final design: geotechnical confirmation of 2 in maximum settlement above the cap bottom (SDG 3.13.2.N.3); strap elevation at an MSE reinforcement level; beam shrinkage strain; environment for the covers; matching current bearing-load analyses; cheek mat development and cap/lug load path. Geometry, journal Kz and landing basis are reconciled. The pile-head force V_pile is not in the FBMP model; raise the strap toward e_res or confirm the piles carry it.
# Notebook values for comparison: f_str,s = 3.089 klf; f_str,u = 3.737 klf; M_u,FF = 1.287 kip-ft; M_u,SF = 4.318 kip-ft; V_u,bw = 2.945 kip; T_u = 51.44 kip-ft; largest D/C = 1.000.
