# Title: End Bent 1 Cap Design (distilled)
# Description: Written by scripts/build_cap_mathcad.py from End Bent 1 Cap Design 10-17.html (case 851f5e1467f2)
## End Bent 1 — Distilled Cap Design Calculation
# Project: D2 I-95 Pedestrian Bridge.
# Distilled from End Bent 1 Cap Design 10-17.html (generated 2026-10-17T18:17:10+00:00); same case (canonical SHA-256 851f5e1467f2) and C005 formula set (327838126d06) as the report; FBMP End Bent 1_Fixed.XML (23bb3afcb362); cap notebook package cfb3565da8c3.
# Codes: AASHTO LRFD Bridge Design Specifications, 10th edition (2024); FDOT Structures Design Guidelines, January 2026, 4.1.4A–C; inherited C005 sectional relations.
# Tool status: CHECK FAILURES — revise the trial cage or section. Inputs are highlighted yellow; key results are boxed.
## 1. Scope
# • Computed here: sectional flexure, minimum steel, strain and Service I crack control in regions N (top steel), P (bottom steel at the piles) and B (bottom steel with the added span bars); the shear depth; actual-cage shear, longitudinal tension, torsion screen and minimum transverse steel at the governing stations found by the tool's station search; the governing transverse spacing; face shrinkage and temperature steel; skin steel; and the governing hook development.
# • Taken from the tool and not recomputed: the station search itself, the intersected-leg window areas and the developed (credited) steel areas (shown as inputs), the detailing and geometry flags, transverse anchorage, the end grid and the D-regions.
# • Service III (D-007) and fatigue remain pending.
## 2. Inputs
## Geometry and materials
b := 42*in
# cap width
h := 36*in  # cap depth
C_t := 3*in
# top clear cover to the hoop
C_b := 3*in  # bottom clear cover to the hoop
C_s := 3*in
# side clear cover to the hoop
f'_c := 5.5*ksi  # concrete strength
f_y := 60*ksi
# steel yield strength
E_s := 29000*ksi  # steel modulus
ϕ_f := 0.9
# flexure φ
ϕ_v := 0.9  # shear φ
γ_e := 1
# crack-control exposure factor
λ_c := 1  # density factor
ϕ_a := 0.9
# axial φ, 5.7.3.5
L_cap := 251*in  # cap length (C005)
s_proj := 12*in  # project spacing limit, face steel
## Actions (C005 inputs from the analysis envelope)
Mu_N := 79.19*kip*ft
# Strength moment, N
MI_N := 51.88*kip*ft  # Service I moment, N
Mu_P := 68.08*kip*ft
# Strength moment, P
MI_P := 48*kip*ft  # Service I moment, P
Mu_B := 182.68*kip*ft
# Strength moment, B
MI_B := 138.65*kip*ft  # Service I moment, B
## Reinforcement
Bar_N1 := 6
# top row 1 bar
n_N1 := 5  # top row 1 count
Bar_N2 := 6
# top row 2 bar
n_N2 := 0  # top row 2 count
Bar_N3 := 6
# top row 3 bar
n_N3 := 0  # top row 3 count
Bar_P := 8
# continuous bottom bar
n_P1 := 4  # bottom row 1 count
n_P2 := 0
# bottom row 2 count
Bar_B := 5  # added span bar
n_B1 := 3
# added bars, row 1
n_B2 := 0  # added bars, row 2
Bar_v := 6
# hoop bar
n_loop := 1  # hoop loops
Bar_skin := 6
# skin bar
n_skin := 4  # skin bars per side
## Fitted actual-cage coordinates (replace the reference cover formulas of the report)
y_N1 := 4.13062286377*in
# top row 1 from the top face
y_N2 := 8.13062286377*in  # top row 2 from the top face
y_N3 := 12.1306228638*in
# top row 3 from the top face
y_P1 := 5.10957717896*in  # bottom row 1 from the bottom face
y_P2 := 9.10957717896*in
# bottom row 2 from the bottom face
y_B1 := 4.92207717896*in  # added row 1 from the bottom face
y_B2 := 8.92207717896*in
# added row 2 from the bottom face
SP_N := 7.49384101497*in  # top bar spacing, fitted
SP_P := 3.00000048522*in
# bottom bar spacing at piles, fitted
SP_B := 8.000001*in  # bottom bar spacing, fitted
SP_skin := 5.35195999146*in  # skin bar spacing, fitted
A_bar := transpose([0, 0, 0, 0.11, 0.2, 0.31, 0.44, 0.6, 0.79, 1, 1.27, 1.56])*in^2
# bar area; index = bar number
d_bar := transpose([0, 0, 0, 0.375, 0.5, 0.625, 0.75, 0.875, 1, 1.128, 1.27, 1.41])*in
# bar diameter; index = bar number
## 3. Figures
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# Figure 1. Cap elevation: piles, bearings, transverse runs, added span bars and the governing stations S (shear) and N, P, B (longitudinal tension) used in Section 8.
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# Figure 2. Cross-section between piles: continuous top (N) and bottom (P) steel, added span bars (B), skin bars and the hoop.
## 4. Steel areas and effective depths (C005)
d_vbar := d_bar[Bar_v]  # hoop bar diameter
As_N := n_N1*A_bar[Bar_N1] + n_N2*A_bar[Bar_N2] + n_N3*A_bar[Bar_N3]
# top steel, N
As_P := (n_P1 + n_P2)*A_bar[Bar_P]  # bottom steel at the piles, P
As_B := As_P + (n_B1 + n_B2)*A_bar[Bar_B]  # bottom steel with the added span bars, B
Av := 2*n_loop*A_bar[Bar_v]  # hoop area per set
As_side := n_skin*A_bar[Bar_skin]  # skin steel, one side
dc_N := (n_N1*A_bar[Bar_N1]*y_N1 + n_N2*A_bar[Bar_N2]*y_N2 + n_N3*A_bar[Bar_N3]*y_N3)/max(As_N, 10^-6*in^2)
# centroid of N from the top face
dc_P := (n_P1*A_bar[Bar_P]*y_P1 + n_P2*A_bar[Bar_P]*y_P2)/max(As_P, 10^-6*in^2)  # centroid of P from the bottom face
dc_B := (As_P*dc_P + n_B1*A_bar[Bar_B]*y_B1 + n_B2*A_bar[Bar_B]*y_B2)/max(As_B, 10^-6*in^2)
# centroid of B from the bottom face
# Regions r: 0 = N (top steel), 1 = P (bottom steel at piles), 2 = B (bottom steel between piles, added bars).
r := 0 .. 2
Region := transpose(["N top", "P bottom at piles", "B bottom between piles"])
A_s := transpose([As_N, As_P, As_B])
d_c := transpose([dc_N, dc_P, dc_B])
M_u := transpose([Mu_N, Mu_P, Mu_B])
M_I := transpose([MI_N, MI_P, MI_B])
S_p := transpose([SP_N, SP_P, SP_B])
d[r] := h - d_c[r]
transpose(d) =  # no stored result  # effective depth
## 5. Flexure and minimum reinforcement (LRFD 5.6.3, 5.6.7)
α_1 := max(0.75, 0.85 - 0.02*max(f'_c/ksi - 10, 0))  # stress block factor α1
β_1 := max(0.65, 0.85 - 0.05*max(f'_c/ksi - 4, 0))  # stress block factor β1
f_r := 0.24*sqrt(f'_c/ksi)*ksi  # modulus of rupture
I_g := b*h^3/12  # gross moment of inertia
y_t := h/2  # centroid to the tension face
M_cr := f_r*I_g/y_t  # cracking moment
M_crm := 1.6*0.67*M_cr  # minimum-steel target, 1.6 · 0.67 M_cr
a[r] := A_s[r]*f_y/(α_1*f'_c*b)
transpose(a) =  # no stored result  # stress block depth
c[r] := a[r]/β_1
transpose(c) =  # no stored result  # neutral axis depth
M_n[r] := A_s[r]*f_y*(d[r] - a[r]/2)
transpose(M_n) =  # no stored result
# nominal moment
M_r[r] := ϕ_f*M_n[r]
transpose(M_r) =  # no stored result  # factored resistance
A_req[r] := M_u[r]/(ϕ_f*f_y*(d[r] - a[r]/2))
transpose(A_req) =  # no stored result
# steel required for M_u
M_min[r] := min(M_crm, 1.33*M_u[r])
transpose(M_min) =  # no stored result
# minimum factored resistance
ε_t[r] := 0.003*(d[r] - c[r])/max(c[r], 10^-6*in)
transpose(ε_t) =  # no stored result  # net tensile strain
DC_flex[r] := M_u[r]/M_r[r]
transpose(DC_flex) =  # no stored result  # flexure, M_u / M_r
DC_min[r] := M_min[r]/M_r[r]
transpose(DC_min) =  # no stored result  # minimum steel, M_min / M_r
DC_eps[r] := 0.005/ε_t[r]
transpose(DC_eps) =  # no stored result  # tension-controlled, 0.005 / ε_t
## 6. Service I crack control (LRFD 5.6.7)
E_c := 120000*0.145^2*(f'_c/ksi)^0.33*ksi  # concrete modulus (C005)
n_m := round(E_s/E_c, 2)  # modular ratio, two decimals
f_slim := 0.8*f_y  # service steel stress limit
nA[r] := n_m*A_s[r]
transpose(nA) =  # no stored result  # transformed steel
c_cr[r] := (-nA[r] + sqrt(nA[r]^2 + 2*b*d[r]*nA[r]))/b
transpose(c_cr) =  # no stored result
# cracked neutral axis
I_cr[r] := b*c_cr[r]^3/3 + nA[r]*(d[r] - c_cr[r])^2
transpose(I_cr) =  # no stored result
# cracked moment of inertia
S_s[r] := I_cr[r]/(d[r] - c_cr[r])
transpose(S_s) =  # no stored result  # section modulus to the steel
β_s[r] := 1 + d_c[r]/(0.7*(h - d_c[r]))
transpose(β_s) =  # no stored result  # β_s
f_sI[r] := M_I[r]*n_m/S_s[r]
transpose(f_sI) =  # no stored result  # Service I steel stress
s_I[r] := if(f_sI[r] > 0*ksi, 700*γ_e/(β_s[r]*f_sI[r]/ksi)*in - 2*d_c[r], 1000000*in)
transpose(s_I) =  # no stored result  # allowable bar spacing, 5.6.7-1
DC_I[r] := max(f_sI[r]/f_slim, S_p[r]/s_I[r])
transpose(DC_I) =  # no stored result  # larger of stress / limit and spacing / allowable
# Service III is not applicable (D-007); fatigue is pending (no confirmed fatigue loads).
## 7. Shear depth
d_min := min(d[0], d[1], d[2])  # least effective depth
d_va := min(d[0] - a[0]/2, d[1] - a[1]/2, d[2] - a[2]/2)  # least d - a/2
d_v := max(0.9*d_min, 0.72*h, d_va)  # effective shear depth (C005)
## 8. Actual-cage section checks at the governing stations
# Stations k: 0 = S, the shear-governing point; 1, 2, 3 = N, P, B, the longitudinal-tension points of each region; 4 = M, the least minimum transverse steel. Each line gives the interval, combination C, element E, load state, station and tension face; the equations recompute every check there.
# • S shear: R6-2 → R6-3 · C1 E28 · STRENGTH-I · x = 156.029 in · bottom face
# • N long.: R8-2/R8-3 · C3 E38 · STRENGTH-III · x = 205.721 in · top face
# • P long.: R6-3/R6-4 · C1 E29 · STRENGTH-I · x = 160.721 in · bottom face
# • B long.: R7-2/R7-3 · C1 E32 · STRENGTH-I · x = 176.990 in · bottom face
# • M min Av: R1-1/R1-2 · C1 E1 · STRENGTH-I · x = 6.221 in · top face
k := 0 .. 4
St := transpose(["S shear", "N long.", "P long.", "B long.", "M min Av"])
## 8.1 Station inputs (from the tool)
x_st := transpose([156.0290764, 205.7209236, 160.7209236, 176.99, 6.220923606])*in
# station from the left cap end
M_st := transpose([26.82994097, -73.16297842, 62.22541724, 182.68, -0.2635315016])*kip*ft
# moment, signed (negative: top in tension)
V_st := transpose([90.92781021, 86.9214762, 90.16054198, 87.49, 1.020511063])*kip
# shear
N_st := transpose([-0.11, -7.38, -0.11, -0.11, 0])*kip  # axial force (positive: tension)
T_st := transpose([0, 1.583764874, 0, 0, 0])*kip*ft  # torque
A_st := transpose([4.92, 3.96, 4.92, 5.85, 0.648503187])*in^2  # developed tension-half steel credited here (C5.7.3.5)
A_dw := transpose([0.88, 0.88, 0.88, 3.52, 1.76])*in^2  # developed steel intersected by the shear window
A_w45 := transpose([3.52, 4.4, 3.52, 4.4, 1.76])*in^2  # hoop steel in the 45° window of length d_v
L_w45 := transpose([30.30815279, 30.30815279, 30.30815279, 30.30815279, 21.375])*in
# that window inside the cap
A_wg := transpose([6.16, 6.16, 6.16, 6.16, 4.4])*in^2  # hoop steel in the window d_v cot θ
L_wg := transpose([45.86077199, 44.62090467, 45.92634075, 47.3754558, 33.13721175])*in
# that window inside the cap
r_adj := transpose([0.097777778, 0.097777778, 0.16761905, 0.097777778, 0.097777778])*in^2/in
# adjacent interval A_v/s
A_cs := transpose([3.96, 4.740343202, 3.96, 3.96, 0.5585070302])*in^2  # developed steel, compression half
A_cc := transpose([752.04, 751.08, 752.04, 752.04, 751.08])*in^2  # concrete area, compression half
s_xe := transpose([12, 12, 12, 12, 30.30815279])*in  # crack spacing parameter s_xe, 5.7.3.4.2-7
A_o := transpose([876.403125, 876.403125, 876.403125, 876.403125, 876.403125])*in^2
# torsion area A_o
p_h := transpose([129, 129, 129, 129, 129])*in  # torsion perimeter p_h
## 8.2 Torsion screen, longitudinal strain and cracking of the compression-half flange
A_vmin := 0.0316*λ_c*sqrt(f'_c/ksi)*ksi*b/min(f_y, 100*ksi)  # minimum transverse steel, 5.7.2.5-1
f_ct := 0.213*λ_c*sqrt(f'_c/ksi)*ksi  # flange cracking stress, C5.4.2.7
T_th[k] := 0.25*ϕ_v*0.126*λ_c*sqrt(f'_c/ksi)*ksi*(b*h)^2/(2*(b + h))*sqrt(max(0, 1 - N_st[k]/(b*h)/(0.126*λ_c*sqrt(f'_c/ksi)*ksi)))
transpose(T_th) =  # no stored result
# torsion threshold, 5.7.2.1
tor[k] := if(T_st[k] > T_th[k], 1, 0)
transpose(tor) =  # no stored result
# torsion investigated (1)
V_ef[k] := if(tor[k] > 0, sqrt(V_st[k]^2 + (0.9*p_h[k]*T_st[k]/(2*A_o[k]))^2), V_st[k])
transpose(V_ef) =  # no stored result  # effective shear, 5.7.3.4.2-5
M_e[k] := max(|M_st[k]|, V_st[k]*d_v)
transpose(M_e) =  # no stored result  # moment for ε: not less than V d_v
ε_b[k] := (M_e[k]/d_v + 0.5*N_st[k] + V_ef[k])/(E_s*A_st[k])
transpose(ε_b) =  # no stored result
# longitudinal strain, 5.7.3.4.2-4
ok45[k] := if(min(r_adj[k], A_w45[k]/L_w45[k]) ≥ A_vmin, 1, 0)  # minimum steel in the 45° window (1)
okg[k] := if(min(r_adj[k], A_wg[k]/L_wg[k]) ≥ A_vmin, 1, 0)  # minimum steel in the d_v cot θ window (1)
simp[k] := if((N_st[k] ≤ 10^-10*kip) and ((ok45[k] > 0) or (h < 16*in)), 1, 0)
transpose(simp) =  # no stored result  # simplified β = 2, θ = 45° eligible (1), 5.7.3.4.1
F_fl[k] := 0.5*N_st[k] + V_ef[k] - |M_st[k]|/d_v
transpose(F_fl) =  # no stored result  # compression-half flange force, C5.7.3.4.2
f_fl[k] := F_fl[k]*E_c/(E_c*A_cc[k] + E_s*A_cs[k])
transpose(f_fl) =  # no stored result
# flange tensile stress
crk[k] := if((N_st[k] > 10^-10*kip) and (f_fl[k] ≥ f_ct), 1, 0)
transpose(crk) =  # no stored result  # flange cracked: ε doubles (1)
ε_s[k] := max(0, ε_b[k])*if(crk[k] > 0, 2, 1)
transpose(ε_s) =  # no stored result
# strain ε_s
## 8.3 Shear resistance (LRFD 5.7.3.3, 5.7.3.4; FDOT SDG 4.1.4A intersected legs)
β_g[k] := 4.8/(1 + 750*ε_s[k])*if(okg[k] > 0, 1, 51/(39 + s_xe[k]/in))
transpose(β_g) =  # no stored result  # general β, 5.7.3.4.2-1/-2
θ_g[k] := (29 + 3500*ε_s[k])*deg
transpose(θ_g) =  # no stored result
# general θ, 5.7.3.4.2-3
cot_g[k] := if(θ_g[k] < 90*deg, 1/tan(θ_g[k]), 0)  # cot θ, general (0 beyond 90°)
l_g[k] := max(d_v*cot_g[k], 10^-8*in)
transpose(l_g) =  # no stored result
# general window length d_v cot θ
β[k] := if(simp[k] > 0, 2, β_g[k])
transpose(β) =  # no stored result
# β used
θ[k] := if(simp[k] > 0, 45*deg, θ_g[k])
transpose(θ) =  # no stored result
# θ used
cot_t[k] := if(θ[k] < 90*deg, 1/tan(θ[k]), 0)  # cot θ used (0 beyond 90°)
okd[k] := if((simp[k] > 0) or (ε_s[k] ≤ 0.006), 1, 0)
transpose(okd) =  # no stored result  # ε_s within 0.006 (1)
V_c[k] := 0.0316*λ_c*β[k]*sqrt(f'_c/ksi)*ksi*b*d_v
transpose(V_c) =  # no stored result  # concrete shear, 5.7.3.3-3
A_w[k] := if(simp[k] > 0, A_w45[k], A_wg[k])
transpose(A_w) =  # no stored result  # hoop steel in the window used
L_w[k] := if(simp[k] > 0, L_w45[k], L_wg[k])
transpose(L_w) =  # no stored result
# window inside the cap
V_s[k] := A_w[k]*min(f_y, 100*ksi)
transpose(V_s) =  # no stored result
# hoop shear resistance
V_lim := 0.25*f'_c*b*d_v  # upper limit 0.25 f′c b d_v
V_r[k] := if(okd[k] > 0, ϕ_v*min(V_c[k] + V_s[k], V_lim), 0*kip)
transpose(V_r) =  # no stored result  # factored shear resistance
DC_V[k] := max(V_st[k]/max(V_r[k], 10^-9*kip), V_ef[k]/ϕ_v/V_lim)
transpose(DC_V) =  # no stored result
# shear D/C
r_eff[k] := A_w[k]/L_w[k]
transpose(r_eff) =  # no stored result
# intersected A_v/s in the window
DC_Av[k] := A_vmin/max(r_eff[k], 10^-9*in^2/in)
transpose(DC_Av) =  # no stored result
# minimum transverse steel D/C
## 8.4 Longitudinal tension (LRFD 5.7.3.5-1, 5.7.3.6.3)
V_cr[k] := min(A_dw[k]*min(f_y, 100*ksi), V_st[k]/ϕ_v)
transpose(V_cr) =  # no stored result  # hoop credit, developed steel
F_sh[k] := max(0*kip, V_st[k]/ϕ_v - 0.5*V_cr[k])
transpose(F_sh) =  # no stored result  # shear part
F_to[k] := if(tor[k] > 0, 0.45*p_h[k]*T_st[k]/(2*A_o[k]*ϕ_v), 0*kip)
transpose(F_to) =  # no stored result  # torsion part
ϕ_m[k] := if(tor[k] > 0, ϕ_v, ϕ_f)  # φ on the moment term
ϕ_n[k] := if(tor[k] > 0, ϕ_v, ϕ_a)  # φ on the axial term
F_mo[k] := |M_st[k]|/(ϕ_m[k]*d_v)
transpose(F_mo) =  # no stored result
# moment term
F_ax[k] := 0.5*N_st[k]/ϕ_n[k]
transpose(F_ax) =  # no stored result
# axial term
F_di[k] := cot_t[k]*sqrt(F_sh[k]^2 + F_to[k]^2)
transpose(F_di) =  # no stored result
# diagonal term
F_req[k] := max(0*kip, F_mo[k] + F_ax[k] + F_di[k])
transpose(F_req) =  # no stored result  # required tension
F_cap[k] := A_st[k]*f_y
transpose(F_cap) =  # no stored result
# tension capacity A_s f_y
DC_L[k] := F_req[k]/F_cap[k]
transpose(DC_L) =  # no stored result  # longitudinal tension D/C
## 8.5 Station results
# Columns, left to right: station; V_r; shear D/C; required tension; tension capacity; tension D/C.
St =  # no stored result
V_r =  # no stored result
DC_V =  # no stored result
F_req =  # no stored result
F_cap =  # no stored result
DC_L =  # no stored result
## 9. Transverse spacing at the governing interval
# Governing interval R1-1 → R1-2; V_u and V_eff are the largest at its search stations.
## Interval data (from the tool)
s_iv := 9*in
# hoop pitch
w_iv := 35.25*in  # across-leg spacing
r_iv := 0.0977777777778*in^2/in
# A_v/s of the interval
V_ivmax := 2.03005617978*kip  # largest V_u
Vef_ivmax := 2.03005617978*kip  # largest V_eff
v_iv := Vef_ivmax/(ϕ_v*b*d_v)  # shear stress, V_eff
s_lim := if(v_iv < 0.125*f'_c, min(0.8*d_v, 24*in), min(0.4*d_v, 12*in))
# maximum spacing, 5.7.2.6
v_o := V_ivmax/(ϕ_v*b*d_v)  # shear stress, V_u
v_o1 := 0.08*sqrt(f'_c/ksi)*ksi  # stress below which the across-leg limit is 42 in
v_o2 := 0.16*sqrt(f'_c/ksi)*ksi  # stress below which the limit is d_v or 24 in
w_mid := if(v_o ≤ v_o2, min(d_v, 24*in), min(0.5*d_v, 12*in))
# limit above the 42 in range
w_lim := if(v_o ≤ v_o1, 42*in, w_mid)  # across-leg limit, SDG 4.1.4C
DC_sp := max(s_iv/s_lim, w_iv/w_lim, A_vmin/r_iv)  # pitch, across-leg spacing and minimum steel
## 10. Face shrinkage and temperature steel, and skin steel
A_tr0 := 1.3*b*h/(2*(b + h)*min(f_y, 75*ksi))*ksi*in/ft  # 5.10.6-1 (b, h in inches, f_y in ksi)
A_tr := min(max(A_tr0, 0.11*in^2/ft), 0.6*in^2/ft)
# required steel per face, 0.11 to 0.60
s_code := if(min(b, h) > 36*in, 12*in, max(18*in, 3*min(b, h)))
# code spacing limit
s_tlim := min(s_code, s_proj)  # adopted spacing limit
# Faces and directions that the tool checks (11); index f.
f := 0 .. 10
Face := ["Top long."; "Bottom long."; "Side left long."; "Side right long."; "Top trans."; "Side left trans."; "Side right trans."; "End left vert."; "End left horiz."; "End right vert."; "End right horiz."]
A_tp := [0.6285714286; 0.9028571429; 0.5866666667; 0.5866666667; 0.5866666667; 0.5866666667; 0.5866666667; 0.2514285714; 0.2933333333; 0.2514285714; 0.2933333333]*in^2/ft
s_tp := [12.02463594; 8.999997229; 5.673117133; 5.673117133; 9; 9; 9; 35.25; 29.25; 35.25; 29.25]*in
DC_ta[f] := A_tr/A_tp[f]
DC_ts[f] := s_tp[f]/s_tlim
# Columns, left to right: face and direction; provided steel; bar spacing; steel D/C; spacing D/C.
Face =  # no stored result
A_tp =  # no stored result
s_tp =  # no stored result
DC_ta =  # no stored result
DC_ts =  # no stored result
# Not checked: Bottom transverse face: excluded from face shrinkage / temperature area and spacing checks: open-bottom pile stirrups in R2, R4, R6, R8.
Skin_req := if(max(d[0], d[1], d[2]) ≥ 3*ft, 1, 0)  # skin steel required (1): d ≥ 3 ft, 5.6.7
s_sk := min(d_min/6, 12*in)  # maximum skin-bar spacing, if required
# Skin steel not required (largest effective depth 31.87 in < 36 in).
## 11. Hook development of the governing added span bar
# Bar L10-S1 (#5, Added span row 1): largest hook length over half its span, 5.10.8.2.4a.
## Bar data (from the tool)
d_bh := 0.625*in
# bar diameter
A_bh := 0.31*in^2  # bar area
r_h := 2.1875*in
# hook bend radius
c_bh := 2.75*in  # cover or half spacing, c_b
lam_rl := 1
# location factor
lam_cf := 1  # coating factor
L_bh := 28*in  # bar length between its hooks
f_h := min(A_bh*f_y, d_bh*r_h*0.45*f'_c)  # bar force at the hook node
l_db := 0.17*d_bh*((f_y - f_h/A_bh)/ksi/(1.97*λ_c*(f'_c/ksi)^0.25))^2  # basic length, 5.10.8.2.4a-1
lam_c := max(0.3, min(1, d_bh/c_bh))  # confinement factor
l_ds := l_db*min(1.7, lam_rl*lam_cf)*lam_c  # straight part
l_dh := max(8*d_bh, 6*in, l_ds + r_h + d_bh/2)  # required hook development
DC_hk := l_dh/(L_bh/2)  # required / half the bar length
## 12. Summary of checks
transpose(Region) =  # no stored result  # demand / capacity; 1.0 or less passes; rows by region
transpose(DC_flex) =  # no stored result  # flexure
transpose(DC_min) =  # no stored result  # minimum steel
transpose(DC_eps) =  # no stored result  # tension-controlled strain
transpose(DC_I) =  # no stored result  # Service I crack control
DC_shear := DC_V[0]  # shear at S
DC_LN := DC_L[1]  # longitudinal tension at N
DC_LP := DC_L[2]  # longitudinal tension at P
DC_LB := DC_L[3]  # longitudinal tension at B
DC_minAv := DC_Av[4]  # minimum transverse steel at M
DC_tamax := max(DC_ta)  # face steel area, largest
DC_tsmax := max(DC_ts)  # face bar spacing, largest
DC_sect := max(DC_flex, DC_min, DC_eps, DC_I, DC_shear, DC_LN, DC_LP, DC_LB)
# flexure, Service I, shear, tension
DC_det := max(DC_minAv, DC_sp, DC_tamax, DC_tsmax, DC_hk)  # transverse steel and spacing, faces, hook
DC_dist := max(DC_sect, DC_det)  # largest of the distilled ratios
Status := if(DC_dist ≤ 1, "PASS", "FAIL")
# distilled numerical checks only
# Figure 3 data: every distilled ratio in check order, split at the limit. A check on the other side of the limit is parked at check number −1, outside the plot.
DC_NPB := stack(DC_flex, DC_min, DC_eps, DC_I)  # checks 1 to 12
DC_all := stack(DC_NPB, DC_shear, DC_LN, DC_LP, DC_LB, DC_minAv, DC_sp, DC_tamax, DC_tsmax, DC_hk)
# distilled ratios in check order
Limit := 1
j := 0 .. last(DC_all)
ymax := max(1.2, 1.1*max(DC_all))
x_ok[j] := if(DC_all[j] ≤ Limit, j + 1, -1)
y_ok[j] := if(DC_all[j] ≤ Limit, DC_all[j], 0)
x_ng[j] := if(DC_all[j] > Limit, j + 1, -1)
y_ng[j] := if(DC_all[j] > Limit, DC_all[j], 0)
CheckGood := augment(x_ok, y_ok)
CheckNoGood := augment(x_ng, y_ng)
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# Figure 3. Demand/capacity ratio of each distilled check (stems) against the limit (dashed line). It is a Mathcad plot of CheckGood and CheckNoGood, so it recalculates with the worksheet and a check turns red when its ratio passes 1.0.
# Check numbers: 1–3 flexure (N, P, B); 4–6 minimum steel (N, P, B); 7–9 tension-controlled strain (N, P, B); 10–12 Service I (N, P, B); 13 shear at S; 14 longitudinal tension at N; 15 longitudinal tension at P; 16 longitudinal tension at B; 17 minimum transverse steel at M; 18 transverse spacing; 19 face steel area, largest; 20 face bar spacing, largest; 21 hook development.
# Failing checks not recomputed here (tool): R2, R4, R6, R8 calculated anchorage / closure: AASHTO LRFD BDS, 10th ed. (2024) 5.10.2.1/.3, 5.10.8.2.6a/b/d. Bend 4.500/4.500 in; hook extension 9.000/9.000 in; midheight embedment 15.000/8.443 in.  CRSI Table 7-2: straight stirrup/tie hook extensions; automatic 9 in. Trial hook rotation: left +50°, right +50°. Rotated-hook anchorage is PENDING: verify 3D engagement of longitudinal bars and hook congestion. The rotation range is not a code allowance. Bar intersects embedded pile / clearance envelope. Keep the bottom open and shorten, raise or relocate the ends. Recomputed here and failing (tool): Actual face shrinkage / temperature spacing: D/C 2.938, End left · Vertical; End right · Vertical (tie).
# The tool reports 47 PENDING items: 2 Service III and fatigue; 3 FDOT covers; 3 D-regions, end regions and the end grid; 39 actual-cage prerequisites behind the distilled checks (anchorage and closure, splices, load path).
# Detailing and geometry flags: 42 pass, as reported by the tool.
