# Title: End Bent 1 Pile Design
# Description: Written by pile_design/mathcad.py (scripts/build_pile_mathcad.py) from the pile_design package 0b518b6fa963; FBMP End Bent 1_Fixed.XML (SHA-256 c1a4afa138865b3f10cc968ce7daef767a4d96e8bc2ccf175c1a5ebd150d912d)
## End Bent 1 Pile Design
# Project: D2 I-95 Pedestrian Bridge.
# Distilled from the pile design notebook (package 0b518b6fa963), case "End Bent 1 piles: 18 in square prestressed concrete, FBMP fixed run". Same inputs, equations and load combinations as the notebook; results should match its exported report.
# Codes: AASHTO LRFD Bridge Design Specifications, 10th edition (2024): 5.6.4.4, 5.6.4.5, 5.6.6.1, 5.7.3.3, 5.7.3.4.2, 5.9.2.3.2, 5.12.9.4; FDOT Structures Design Guidelines (SDG) 3.5 and Structures Detailing Manual (SDM) 11.4, January 2026; Standard Plans Index 455.
# Status: All numerical checks pass (largest ratio 1.00) · 15 pending item(s) remain. Inputs are highlighted yellow; values for the plans are boxed.
## 1. Design basis
# • FBMP source: End Bent 1_Fixed.XML, SHA-256 c1a4afa138865b3f10cc968ce7daef767a4d96e8bc2ccf175c1a5ebd150d912d (registered export EB-XML). 4 piles at 4.5 ft; cutoff elevation 41.2375 ft, ground 24.01 ft.
# • Pile: Standard Plans Index 455-018 (18 in square), strand pattern 12~0.6, spiral 0.034 in² wire at 6 in.
# • Downdrag 18 tons per pile is a drag load DR: gamma_DR = 1.1 (strength) and 1 (Service I) in the structural demands (LRFD Table 3.4.1-1, 10.7.3.7); it is excluded from the Factored Design Load and added nominally to the required bearing resistance (SDG Eq. 3-1, phi = 0.75).
# • Every worksheet equation is parsed once and evaluated by the generator with unit checking; the build compares each result with the notebook before the file is written. Governing records, the notebook angles and the neutral-axis depth c_gov are inputs read from the notebook.
# • The interaction curve is swept live (vectors); the biaxial route of LRFD 5.6.4.5 and the strain-compatibility check about the resultant axis are both evaluated, and the larger ratio governs.
## 2. Inputs
## Pile and layout
D_pile := 18*in
# Pile size (square side, or pipe outside diameter)
N_pile := 4  # Piles in the support
S_pile := 4.5*ft
# Center-to-center pile spacing
EL_cutoff := 41.2375*ft  # Pile cutoff elevation (FBMP pile head)
EL_ground := 24.01*ft
# Ground elevation (top of soil layer 1)
L_unsupported := 17.2275*ft  # Length above ground (cutoff - ground); editable
embed_cap := 12*in  # Pile embedment into the cap
## Loads and geotechnical
DD_tons := 18
# Downdrag (drag load DR) per pile, short tons [pending confirmation]
γ_DR.str := 1.1  # Drag-load factor, strength limit states (structural)
γ_DR.ser := 1
# Drag-load factor, Service I
ϕ_geo := 0.75  # Geotechnical resistance factor (compression, Davisson)
R_scour.net.tons := 0
# Net scour resistance, short tons [pending confirmation]
R_scour.total.tons := 0  # Total scour resistance, short tons [pending confirmation]
K_eff := 1
# Effective length factor K
soil_type := 0  # Soil for depth to fixity (0 sand, 1 clay) [pending confirmation]
n_h := 0.556*ksi/ft
# Rate of increase of soil modulus, sand
S_u := 1*kip/ft^2  # Undrained shear strength, clay (used only for soil type 1) [pending confirmation]
## Environment and policy
environment := 2
# Environment classification [pending confirmation]
min_size.policy := 14*in  # Minimum square pile size, pedestrian bridge
λ_c := 1  # Concrete density modification factor
## Prestressed concrete pile
f'_c := 6.5*ksi
# Pile concrete strength f'c
w_c := 0.15*kip/ft^3  # Concrete unit weight (for Ec)
K_1 := 1
# Aggregate correction factor for Ec
ϕ_c := 0.75  # Compression-controlled resistance factor
ϕ_t := 1
# Tension-controlled resistance factor, bonded prestressing
n_sweep := 121  # Neutral-axis sweep points for the interaction curve
## Prestress and strand
f_pu := 270*ksi
# Strand ultimate strength (Grade 270 LRS)
f_py := 243*ksi  # Strand yield strength 0.9 fpu
E_p := 28500*ksi
# Strand modulus
loss_frac := 0.2  # Prestress loss as a fraction of the jacking force
d_edge := 3.5*in  # Strand center distance from the pile face
## Shear reinforcement
spiral_wire.area := 0.034*in^2
# Spiral wire area (one leg)
spiral_pitch := 6*in  # Spiral pitch
f_y.spiral := 70*ksi
# Spiral wire yield strength [pending confirmation]
a_g := 0.75*in  # Maximum aggregate size
ϕ_v := 0.9  # Shear resistance factor, concrete
## Standard Plans Index 455-018, strand pattern 12~0.6
N_str := 12
# strands in pattern 12~0.6
A_str := 0.217*in^2  # strand nominal area
P_jack := 35*kip
# jacking force per strand, Standard Plans
d_void := 0*in  # void diameter (Index 455-030 only)
R_drive.tons := 300
# maximum driving resistance, SDG Table 3.5.13-1, tons
M_splice := 245*kip*ft  # Spec Table 455-2 splice bending strength (INFO)
## 3. Demands from the FBMP export
# Governing records of End Bent 1_Fixed.XML for each check (index g). FBMP axial force is converted to compression positive. The drag load DR = DD is added to the axial force at every station (LRFD Table 3.4.1-1, 10.7.3.7): gamma_DR for the limit state of the record. Downdrag is not in the Factored Design Load.
# • Axial: combo 3 STRENGTH-III · pile 4 · element 10J · EL 24.01 ft.
# • 5.6.4.5: combo 2 STRENGTH-III · pile 4 · element 12J · EL 18.60 ft (+1 tied).
# • Resultant: combo 2 STRENGTH-III · pile 4 · element 13I · EL 18.60 ft.
# • Shear: combo 3 STRENGTH-III · pile 4 · element 15I · EL 13.20 ft.
# • Svc comp.: combo 4 SERVICE-I · pile 4 · element 12J · EL 18.60 ft.
# • Svc tens.: combo 4 SERVICE-I · pile 1 · element 1I · EL 41.24 ft (+239 tied).
r := 0 .. 5
Rec := transpose(["Axial", "5.6.4.5", "Resultant", "Shear", "Svc comp.", "Svc tens."])
P_fbmp := transpose([105.39, 84.01, 80.64, 92.5, 90.28, 50.32])*kip  # FBMP axial force at the record, compression positive
M_2 := transpose([1.9, 38.71, -38.71, -2.43, 18.89, -1.21])*kip*ft  # FBMP moment M2, signed
M_3 := transpose([-69.79, -95.23, 95.23, 62.5, -39.38, -36.13])*kip*ft  # FBMP moment M3, signed
M_res := transpose([69.815859, 102.79697, 102.79697, 62.547221, 43.676269, 36.150256])*kip*ft
# resultant moment of the record
V_res := transpose([7.343296, 1.592011, 4.598619, 8.762283, 1.317953, 3.08112])*kip
# resultant shear of the record
FDL_fbmp := 98.88*kip  # Factored Design Load: maximum strength head compression, FBMP (no downdrag)
T_u := 0*kip  # maximum strength uplift anywhere along the pile, FBMP
DD := DD_tons*2*kip  # downdrag (drag load DR) per pile, nominal
DR_str := γ_DR.str*DD  # drag load, strength limit states
DR_ser := γ_DR.ser*DD  # drag load, Service I
γ_g := transpose([γ_DR.str, γ_DR.str, γ_DR.str, γ_DR.str, γ_DR.ser, γ_DR.ser])  # drag-load factor of each record
P_u[r] := P_fbmp[r] + γ_g[r]*DD  # factored axial load incl. drag load
# Columns, left to right: record; FBMP axial force; P_u incl. drag load; resultant moment; resultant shear.
Rec =  # no stored result
P_fbmp =  # no stored result
P_u =  # no stored result
M_res =  # no stored result
V_res =  # no stored result
## 4. Pile spacing
S_min := 3*D_pile  # minimum center-to-center spacing, 3.0 diameters (SDG 3.5.4)
s_over.D := S_pile/D_pile  # provided spacing in pile diameters
DC_sp := S_min/S_pile  # spacing D/C
## 5. Section and prestress
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# Figure 1. Pile cross-section: strand pattern of the Standard Plans option and the bending axes of the governing resultant and shear records.
A_ps := N_str*A_str  # prestressing steel area
f_pj := P_jack/A_str  # jacking stress per strand
f_pe := f_pj*(1 - loss_frac)  # effective prestress after losses
P_e := A_ps*f_pe  # effective prestress force
A_g := D_pile^2 - 0.785398163397*d_void^2  # gross area (chamfers ignored)
I_g := D_pile^4/12 - 0.0490873852123*d_void^4  # gross moment of inertia
S_g := I_g/(D_pile/2)  # section modulus
f_pc.eff := P_e/A_g  # effective uniform prestress on the gross area
β_1 := min(0.85, max(0.65, 0.85 - 0.05*(f'_c - 4*ksi)/ksi))
# stress block factor, 5.6.2.2
E_c := 120000*K_1*(w_c/(kip/ft^3))^2*(f'_c/ksi)^0.33*ksi  # concrete modulus, 5.4.2.4-1
ε_cu := 0.003  # concrete crushing strain
k_c := min(0.85, max(0.75, 0.85 - 0.02*max(f'_c - 10*ksi, 0*ksi)/ksi))
# ratio of maximum concrete stress to f'c
ε_pe := f_pe/E_p  # effective prestrain
ε_ce := f_pc.eff/E_c  # concrete decompression strain
## Strand coordinates (one strand at each corner, equal spacing between, concentric)
k_row := N_str/4 + 1  # strands on each face
p_st := (D_pile - 2*d_edge)/(k_row - 1)  # strand pitch
h_st := D_pile/2 - d_edge  # strand distance from the centroid, each face
n := 0 .. N_str - 1
b_st[n] := if(n < k_row, 0, if(n < 2*k_row, k_row, if(n < 3*k_row - 2, 2*k_row - 1, 3*k_row - 3)))
# first strand index of the face the strand is on
j_st[n] := n - b_st[n]  # position along the face
x_st[n] := if(n < 2*k_row, -h_st + j_st[n]*p_st, if(n < 3*k_row - 2, -h_st, h_st))  # strand x
y_st[n] := if(n < k_row, -h_st, if(n < 2*k_row, h_st, -h_st + j_st[n]*p_st))  # strand y
# The strand coordinates x_st, y_st (index s) are vectors; they are not displayed here. Figure 1 draws them.
## 6. Axial resistance (LRFD 5.6.4.4, 5.5.4.2)
P_u.axial := P_u[0]  # largest factored compression incl. drag load
P_o := k_c*f'_c*(A_g - A_ps) - A_ps*(f_pe - E_p*ε_cu)  # axial resistance at zero eccentricity, 5.6.4.4-2
P_n.max := 0.85*P_o  # maximum nominal axial resistance (spiral)
P_r.max := ϕ_c*P_n.max  # maximum factored axial resistance
ϕ_Po := ϕ_c*P_o  # phi Po, used in Eq. 5.6.4.5-1
P_bi.lim := 0.1*ϕ_c*f'_c*A_g  # axial load limit between Eqs. 5.6.4.5-1 and -3
P_t.yield := A_ps*f_py  # strand yield limit Aps fpy (upper bound of tension, 5.6.6.1)
DC_axial := P_u.axial/P_r.max  # axial compression D/C, largest Pu / phi Pn,max
## 7. Interaction by strain compatibility (LRFD 5.6.4.5, C5.6.2.1, 5.5.4.2)
# • Strain is linear with the extreme compression fiber at eps_cu = 0.003 and a neutral-axis depth c swept geometrically from 4H to 0.02H (H = depth of the section normal to the bending axis). Strand strain = eps_pe + eps_ce + eps_cu (d - c)/c.
# • Strand stress: PCI power formula for Grade 270 low-relaxation strand in tension, Ep eps in compression (no correction for displaced concrete). Concrete: rectangular block a = beta1 c on the compressed part of the square (chamfers ignored).
# • Pn is held between -Aps fpy and Pn,max; phi runs from 0.75 to 1.00 as the net tensile strain goes from 0.002 to 0.005. The pure-compression and pure-tension points are scalars; the sweep vectors hold the 121 points between them.
# • Figure 2 is a picture; the points behind it are the live vectors of this section (Mathcad recomputes them).
i := 0 .. n_sweep - 1
u := 0 .. n_sweep + 1
q := 0 .. n_sweep
## End points of the curve
P_r.pc := ϕ_c*P_n.max  # pure compression: phi Pn,max (Mr = 0)
P_n.pt := -P_t.yield  # pure tension: Pn = -Aps fpy (Mr = 0)
P_r.pt := (-ϕ_t)*P_t.yield  # pure tension: phi Pn, phi = tension-controlled
## Bending about an axis parallel to a face (angle 0)
sn_x := sin(0*deg)  # sin of the bending-axis angle
cs_x := sin(0*deg + 90*deg)  # cos of the bending-axis angle
H_x := D_pile*(sn_x + cs_x)  # depth of the section normal to the bending axis
s_max.x := H_x/2  # centroid to the extreme compression fiber
t1_x := D_pile*sn_x  # depth at which the compressed width stops growing
t2_x := D_pile*cs_x  # depth at which the compressed width starts to shrink
q_x := sn_x*cs_x  # sin x cos of the angle
s_st.x[n] := (-sn_x)*x_st[n] + cs_x*y_st[n]  # strand coordinate toward the compression face
d_st.x[n] := s_max.x - s_st.x[n]  # strand depth from the extreme compression fiber
d_t.x := max(d_st.x)  # depth of the extreme tension strand
c_x[i] := 4*H_x*0.005^(i/(n_sweep - 1))  # neutral-axis depth
a_x[i] := min(β_1*c_x[i], H_x)  # compression block depth a = beta1 c, not beyond the section
A_b.x[i] := D_pile*a_x[i]  # compressed area
J_b.x[i] := D_pile*a_x[i]^2/2  # integral of depth times width over the block
ε_p.x[i, n] := ε_pe + ε_ce + ε_cu*(d_st.x[n] - c_x[i])/c_x[i]  # strand strain
g_p.x[i, n] := 0.025 + 0.975/(1 + (118*ε_p.x[i, n])^10)^0.1  # power-formula factor
f_p.x[i, n] := if(ε_p.x[i, n] > 0, min(E_p*ε_p.x[i, n]*g_p.x[i, n], f_pu), E_p*ε_p.x[i, n])  # strand stress, PCI power formula (tension) or Ep eps (compression)
S_f.x1[i] := f_p.x[i, 0] + f_p.x[i, 1] + f_p.x[i, 2] + f_p.x[i, 3]
S_f.x2[i] := S_f.x1[i] + f_p.x[i, 4] + f_p.x[i, 5] + f_p.x[i, 6] + f_p.x[i, 7]
S_f.x3[i] := S_f.x2[i] + f_p.x[i, 8] + f_p.x[i, 9] + f_p.x[i, 10] + f_p.x[i, 11]
S_m.x1[i] := f_p.x[i, 0]*s_st.x[0] + f_p.x[i, 1]*s_st.x[1] + f_p.x[i, 2]*s_st.x[2] + f_p.x[i, 3]*s_st.x[3]
S_m.x2[i] := S_m.x1[i] + f_p.x[i, 4]*s_st.x[4] + f_p.x[i, 5]*s_st.x[5] + f_p.x[i, 6]*s_st.x[6] + f_p.x[i, 7]*s_st.x[7]
S_m.x3[i] := S_m.x2[i] + f_p.x[i, 8]*s_st.x[8] + f_p.x[i, 9]*s_st.x[9] + f_p.x[i, 10]*s_st.x[10] + f_p.x[i, 11]*s_st.x[11]
F_ps.x[i] := A_str*S_f.x3[i]  # strand force, tension positive
M_ps.x[i] := A_str*S_m.x3[i]  # moment of the strand forces about the centroid
P_n.x[i] := min(max(0.85*f'_c*A_b.x[i] - F_ps.x[i], -P_t.yield), P_n.max)  # nominal axial resistance
M_n.x[i] := 0.85*f'_c*(s_max.x*A_b.x[i] - J_b.x[i]) - M_ps.x[i]  # nominal moment
ε_t.x[i] := ε_cu*(d_t.x - c_x[i])/c_x[i]  # net tensile strain
ϕ_x[i] := min(max(ϕ_c + (ϕ_t - ϕ_c)*(ε_t.x[i] - 0.002)/0.003, ϕ_c), ϕ_t)  # resistance factor, 5.5.4.2
P_r.x[i] := ϕ_x[i]*P_n.x[i]  # factored axial resistance
M_r.x[i] := ϕ_x[i]*M_n.x[i]  # factored moment resistance
## Sample of the sweep (axis parallel to a face)
p := 0 .. 8
c_tab[p] := c_x[15*p]  # neutral-axis depth
ε_tab[p] := ε_t.x[15*p]  # net tensile strain
ϕ_tab[p] := ϕ_x[15*p]  # resistance factor
Pr_tab[p] := P_r.x[15*p]  # factored axial resistance
Mr_tab[p] := M_r.x[15*p]  # factored moment resistance
# Columns, left to right: c; net tensile strain; phi; Pr; Mr (every 15th of the 121 sweep points).
c_tab =  # no stored result
ε_tab =  # no stored result
ϕ_tab =  # no stored result
Pr_tab =  # no stored result
Mr_tab =  # no stored result
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# Figure 2. Interaction diagram: factored curves for bending parallel to a face and about the governing resultant axis, with the governing demand points. The picture is static; its points are the live vectors of Sections 7 to 9.
P_ext.x := stack([P_r.pc], P_r.x, [P_r.pt])  # sweep with its end points
M_ext.x := stack([0*kip*ft], M_r.x, [0*kip*ft])  # sweep with its end points
dP_x[q] := P_ext.x[q + 1] - P_ext.x[q]  # segment axial step
dM_x[q] := M_ext.x[q + 1] - M_ext.x[q]  # segment moment step
P_lo.x[q] := min(P_ext.x[q], P_ext.x[q + 1])  # segment axial low
P_hi.x[q] := max(P_ext.x[q], P_ext.x[q + 1])  # segment axial high
P_ref.0 := 0*kip
M_i.0[q] := if(dP_x[q] == 0*kip, max(0*kip*ft, dM_x[q]), (P_ref.0 - P_ext.x[q])/dP_x[q]*dM_x[q])
# moment gained along the segment
w_0[q] := if((P_ref.0 ≥ P_lo.x[q] - 10^-12*kip) and (P_ref.0 ≤ P_hi.x[q] + 10^-12*kip), 1, 0)
# segment spans that axial load (1)
M_s.0[q] := w_0[q]*(M_ext.x[q] + M_i.0[q])  # Mr on the segment at that axial load
M_r.P0 := max(M_s.0)  # factored moment resistance at zero axial load (splice comparison; Eq. 5.6.4.5-3)
DC_splice := M_splice/M_r.P0  # Table 455-2 splice strength / pile phi Mn (INFO)
## 8. Combined axial load and biaxial flexure (LRFD 5.6.4.5)
# Governing record (index 1): Pu = 123.61 kip against 0.10 phi f'c Ag = 157.95 kip, so Eq. 5.6.4.5-3 applies.
P_u.bi := P_u[1]  # factored axial load of the record
M_ux.bi := |M_2[1]|  # moment about the x axis
M_uy.bi := |M_3[1]|  # moment about the y axis
M_rx := M_r.P0  # uniaxial factored moment resistance about x: pure flexure (P = 0), conservative
M_ry := M_rx  # about y (square section)
DC_bi := M_ux.bi/M_rx + M_uy.bi/M_ry  # D/C, Eq. 5.6.4.5-3
## 9. Resultant bending axis (strain compatibility at the demand angle)
# The demand moment is resisted about the axis of the resultant moment. The curve is swept again with the section rotated by the folded angle alpha (0 to 45 degrees, the square being symmetric); the demand ray from the origin meets the phi-curve at (Pr, Mr) and D/C = Mu / Mr along the ray. The angle is the notebook's; tan(alpha) = M_min / M_max proves it.
P_u.rs := P_u[2]  # factored axial load of the record
M_u.rs := M_res[2]  # resultant moment of the record
α_rs := 22.1212283348*deg  # bending-axis angle of the resultant moment, from the notebook (folded to 0-45 deg)
tan_rs := tan(α_rs)  # tan alpha
r_rs := min(|M_2[2]|, |M_3[2]|)/max(|M_2[2]|, |M_3[2]|)  # M_min / M_max of the record (equals tan alpha)
sn_r := sin(α_rs)  # sin of the bending-axis angle
cs_r := sin(α_rs + 90*deg)  # cos of the bending-axis angle
H_r := D_pile*(sn_r + cs_r)  # depth of the section normal to the bending axis
s_max.r := H_r/2  # centroid to the extreme compression fiber
t1_r := D_pile*sn_r  # depth at which the compressed width stops growing
t2_r := D_pile*cs_r  # depth at which the compressed width starts to shrink
q_r := sn_r*cs_r  # sin x cos of the angle
s_st.r[n] := (-sn_r)*x_st[n] + cs_r*y_st[n]  # strand coordinate toward the compression face
d_st.r[n] := s_max.r - s_st.r[n]  # strand depth from the extreme compression fiber
d_t.r := max(d_st.r)  # depth of the extreme tension strand
c_r[i] := 4*H_r*0.005^(i/(n_sweep - 1))  # neutral-axis depth
a_r[i] := min(β_1*c_r[i], H_r)  # compression block depth a = beta1 c, not beyond the section
A_b.r[i] := (min(a_r[i], t1_r)^2 + 2*t1_r*max(a_r[i] - t1_r, 0*in) - max(a_r[i] - t2_r, 0*in)^2)/(2*q_r)
# compressed area
J_p.r[i] := min(a_r[i], t1_r)^3/3 + t1_r*(max(a_r[i], t1_r)^2 - t1_r^2)/2  # first moment, rising width
J_q.r[i] := (max(a_r[i], t2_r)^3 - t2_r^3)/3 - t2_r*(max(a_r[i], t2_r)^2 - t2_r^2)/2
# first moment, falling width
J_b.r[i] := (J_p.r[i] - J_q.r[i])/q_r  # integral of depth times width over the block
ε_p.r[i, n] := ε_pe + ε_ce + ε_cu*(d_st.r[n] - c_r[i])/c_r[i]  # strand strain
g_p.r[i, n] := 0.025 + 0.975/(1 + (118*ε_p.r[i, n])^10)^0.1  # power-formula factor
f_p.r[i, n] := if(ε_p.r[i, n] > 0, min(E_p*ε_p.r[i, n]*g_p.r[i, n], f_pu), E_p*ε_p.r[i, n])  # strand stress, PCI power formula (tension) or Ep eps (compression)
S_f.r1[i] := f_p.r[i, 0] + f_p.r[i, 1] + f_p.r[i, 2] + f_p.r[i, 3]
S_f.r2[i] := S_f.r1[i] + f_p.r[i, 4] + f_p.r[i, 5] + f_p.r[i, 6] + f_p.r[i, 7]
S_f.r3[i] := S_f.r2[i] + f_p.r[i, 8] + f_p.r[i, 9] + f_p.r[i, 10] + f_p.r[i, 11]
S_m.r1[i] := f_p.r[i, 0]*s_st.r[0] + f_p.r[i, 1]*s_st.r[1] + f_p.r[i, 2]*s_st.r[2] + f_p.r[i, 3]*s_st.r[3]
S_m.r2[i] := S_m.r1[i] + f_p.r[i, 4]*s_st.r[4] + f_p.r[i, 5]*s_st.r[5] + f_p.r[i, 6]*s_st.r[6] + f_p.r[i, 7]*s_st.r[7]
S_m.r3[i] := S_m.r2[i] + f_p.r[i, 8]*s_st.r[8] + f_p.r[i, 9]*s_st.r[9] + f_p.r[i, 10]*s_st.r[10] + f_p.r[i, 11]*s_st.r[11]
F_ps.r[i] := A_str*S_f.r3[i]  # strand force, tension positive
M_ps.r[i] := A_str*S_m.r3[i]  # moment of the strand forces about the centroid
P_n.r[i] := min(max(0.85*f'_c*A_b.r[i] - F_ps.r[i], -P_t.yield), P_n.max)  # nominal axial resistance
M_n.r[i] := 0.85*f'_c*(s_max.r*A_b.r[i] - J_b.r[i]) - M_ps.r[i]  # nominal moment
ε_t.r[i] := ε_cu*(d_t.r - c_r[i])/c_r[i]  # net tensile strain
ϕ_r[i] := min(max(ϕ_c + (ϕ_t - ϕ_c)*(ε_t.r[i] - 0.002)/0.003, ϕ_c), ϕ_t)  # resistance factor, 5.5.4.2
P_r.r[i] := ϕ_r[i]*P_n.r[i]  # factored axial resistance
M_r.r[i] := ϕ_r[i]*M_n.r[i]  # factored moment resistance
P_ext.r := stack([P_r.pc], P_r.r, [P_r.pt])  # sweep with its end points
M_ext.r := stack([0*kip*ft], M_r.r, [0*kip*ft])  # sweep with its end points
dP_r[q] := P_ext.r[q + 1] - P_ext.r[q]  # segment axial step
dM_r[q] := M_ext.r[q + 1] - M_ext.r[q]  # segment moment step
P_lo.r[q] := min(P_ext.r[q], P_ext.r[q + 1])  # segment axial low
P_hi.r[q] := max(P_ext.r[q], P_ext.r[q + 1])  # segment axial high
g_rs[u] := M_ext.r[u]*P_u.rs - P_ext.r[u]*M_u.rs  # moment shortfall of each curve point against the ray
k_rsu[u] := if(g_rs[u] ≥ 0*kip*kip*ft, u, n_sweep + 1)  # curve point beyond the ray
k_rs := min(k_rsu)  # first curve point beyond the ray (resultant axis)
kk_rs := max(k_rs, 1)  # upper end of the interpolated segment
gh_rs := g_rs[kk_rs]  # shortfall, upper end
gl_rs := g_rs[kk_rs - 1]  # shortfall, lower end
t_rs := if(gh_rs == gl_rs, 0, -gl_rs/(gh_rs - gl_rs))  # interpolation fraction
Pl_rs := P_ext.r[kk_rs - 1]
Ph_rs := P_ext.r[kk_rs]
Ml_rs := M_ext.r[kk_rs - 1]
Mh_rs := M_ext.r[kk_rs]
P_r.rs := if(k_rs == 0, P_ext.r[0], Pl_rs + t_rs*(Ph_rs - Pl_rs))
# axial resistance where the ray meets the curve
M_r.rs := if(k_rs == 0, M_ext.r[0], Ml_rs + t_rs*(Mh_rs - Ml_rs))
# moment resistance where the ray meets the curve
lam_rs := (P_u.rs*P_r.rs/kip^2 + M_u.rs*M_r.rs/(kip*ft)^2)/((P_u.rs/kip)^2 + (M_u.rs/(kip*ft))^2)  # projection of the capacity point on the ray
DC_ray := 1/lam_rs  # |demand| / |capacity| along the ray
DC_rs := if(M_u.rs > 0.001*kip*ft, M_u.rs/M_r.rs, P_u.rs/P_r.rs)  # D/C, resultant bending axis
## Check at the notebook's solved neutral-axis depth
# The ray meets the sweep between two neighbouring points; the neutral-axis depth there is interpolated. The worksheet takes the notebook's depth c_gov as an input, finds the same depth from its own vectors, and evaluates the section exactly at c_gov (no interpolation between sweep points).
c_gov := 13.9108943899*in  # neutral-axis depth where the demand ray meets the resultant-axis curve, from the notebook
c_live := c_r[max(kk_rs - 2, 0)] + t_rs*(c_r[min(kk_rs - 1, n_sweep - 1)] - c_r[max(kk_rs - 2, 0)])
# the same depth from the worksheet's own vectors
v := 0 .. 0
c_p[v] := c_gov  # neutral-axis depth
a_p[v] := min(β_1*c_p[v], H_r)  # compression block depth a = beta1 c, not beyond the section
A_b.p[v] := (min(a_p[v], t1_r)^2 + 2*t1_r*max(a_p[v] - t1_r, 0*in) - max(a_p[v] - t2_r, 0*in)^2)/(2*q_r)
# compressed area
J_p.p[v] := min(a_p[v], t1_r)^3/3 + t1_r*(max(a_p[v], t1_r)^2 - t1_r^2)/2  # first moment, rising width
J_q.p[v] := (max(a_p[v], t2_r)^3 - t2_r^3)/3 - t2_r*(max(a_p[v], t2_r)^2 - t2_r^2)/2
# first moment, falling width
J_b.p[v] := (J_p.p[v] - J_q.p[v])/q_r  # integral of depth times width over the block
ε_p.p[v, n] := ε_pe + ε_ce + ε_cu*(d_st.r[n] - c_p[v])/c_p[v]  # strand strain
g_p.p[v, n] := 0.025 + 0.975/(1 + (118*ε_p.p[v, n])^10)^0.1  # power-formula factor
f_p.p[v, n] := if(ε_p.p[v, n] > 0, min(E_p*ε_p.p[v, n]*g_p.p[v, n], f_pu), E_p*ε_p.p[v, n])  # strand stress, PCI power formula (tension) or Ep eps (compression)
S_f.p1[v] := f_p.p[v, 0] + f_p.p[v, 1] + f_p.p[v, 2] + f_p.p[v, 3]
S_f.p2[v] := S_f.p1[v] + f_p.p[v, 4] + f_p.p[v, 5] + f_p.p[v, 6] + f_p.p[v, 7]
S_f.p3[v] := S_f.p2[v] + f_p.p[v, 8] + f_p.p[v, 9] + f_p.p[v, 10] + f_p.p[v, 11]
S_m.p1[v] := f_p.p[v, 0]*s_st.r[0] + f_p.p[v, 1]*s_st.r[1] + f_p.p[v, 2]*s_st.r[2] + f_p.p[v, 3]*s_st.r[3]
S_m.p2[v] := S_m.p1[v] + f_p.p[v, 4]*s_st.r[4] + f_p.p[v, 5]*s_st.r[5] + f_p.p[v, 6]*s_st.r[6] + f_p.p[v, 7]*s_st.r[7]
S_m.p3[v] := S_m.p2[v] + f_p.p[v, 8]*s_st.r[8] + f_p.p[v, 9]*s_st.r[9] + f_p.p[v, 10]*s_st.r[10] + f_p.p[v, 11]*s_st.r[11]
F_ps.p[v] := A_str*S_f.p3[v]  # strand force, tension positive
M_ps.p[v] := A_str*S_m.p3[v]  # moment of the strand forces about the centroid
P_n.p[v] := min(max(0.85*f'_c*A_b.p[v] - F_ps.p[v], -P_t.yield), P_n.max)  # nominal axial resistance
M_n.p[v] := 0.85*f'_c*(s_max.r*A_b.p[v] - J_b.p[v]) - M_ps.p[v]  # nominal moment
ε_t.p[v] := ε_cu*(d_t.r - c_p[v])/c_p[v]  # net tensile strain
ϕ_p[v] := min(max(ϕ_c + (ϕ_t - ϕ_c)*(ε_t.p[v] - 0.002)/0.003, ϕ_c), ϕ_t)  # resistance factor, 5.5.4.2
P_r.p[v] := ϕ_p[v]*P_n.p[v]  # factored axial resistance
M_r.p[v] := ϕ_p[v]*M_n.p[v]  # factored moment resistance
P_n.cg := P_n.p[0]  # Pn at c_gov
M_n.cg := M_n.p[0]  # Mn at c_gov
ε_t.cg := ε_t.p[0]  # net tensile strain at c_gov
ϕ_cg := ϕ_p[0]  # phi at c_gov
P_r.cg := P_r.p[0]  # Pr at c_gov
M_r.cg := M_r.p[0]  # Mr at c_gov
lam_cg := (P_u.rs*P_r.cg/kip^2 + M_u.rs*M_r.cg/(kip*ft)^2)/((P_u.rs/kip)^2 + (M_u.rs/(kip*ft))^2)  # projection of the point on the ray
DC_cg := 1/lam_cg  # D/C at c_gov (no interpolation between sweep points)
## 10. Tension (LRFD 5.6.6.1, 5.8.2.4.1-1)
P_n.t := A_ps*min(f_py, f_pe + 60*ksi)  # nominal tension resistance (fy = 60 ksi, no nonprestressed steel)
P_r.t := ϕ_t*P_n.t  # factored tension resistance
DC_t := T_u/P_r.t  # tension D/C, maximum strength uplift
## 11. Shear: general procedure (LRFD 5.7.3.3, 5.7.3.4.2)
# Governing shear record (index 3). Aps and de are those of the half depth on the flexural tension side of the resultant bending axis (angle alpha_sh from the notebook). Spiral legs crossing the shear plane: two.
V_u.sh := V_res[3]  # resultant shear
M_u.sh := M_res[3]  # concurrent resultant moment
P_u.sh := P_u[3]  # factored axial load
α_sh := 2.22653844049*deg  # bending-axis angle of the shear record, from the notebook (folded to 0-45 deg)
tan_sh := tan(α_sh)  # tan alpha
r_sh := min(|M_2[3]|, |M_3[3]|)/max(|M_2[3]|, |M_3[3]|)  # M_min / M_max of the record (equals tan alpha)
sn_h := sin(α_sh)  # sin alpha
cs_h := sin(α_sh + 90*deg)  # cos alpha
s_max.h := D_pile*(sn_h + cs_h)/2  # centroid to the extreme compression fiber
s_sh[n] := (-sn_h)*x_st[n] + cs_h*y_st[n]  # strand coordinate toward the compression face
m_sh[n] := if(s_sh[n] < (-10^-9)*in, 1, 0)  # strand on the flexural tension half depth (1)
w_sh[n] := m_sh[n]*s_sh[n]  # its coordinate
n_t1 := m_sh[0] + m_sh[1] + m_sh[2] + m_sh[3]
n_t2 := n_t1 + m_sh[4] + m_sh[5] + m_sh[6] + m_sh[7]
n_tens := n_t2 + m_sh[8] + m_sh[9] + m_sh[10] + m_sh[11]  # strands on the tension half
w_t1 := w_sh[0] + w_sh[1] + w_sh[2] + w_sh[3]
w_t2 := w_t1 + w_sh[4] + w_sh[5] + w_sh[6] + w_sh[7]
w_tens := w_t2 + w_sh[8] + w_sh[9] + w_sh[10] + w_sh[11]  # sum of their coordinates
A_ps.t := A_str*n_tens  # prestressing on the flexural tension half depth
d_e := s_max.h - w_tens/n_tens  # depth from the compression fiber to that steel
b_v := D_pile - d_void  # effective web width
d_v := max(0.9*d_e, 0.72*D_pile)  # effective shear depth, 5.7.2.8
M_u.v := max(M_u.sh, V_u.sh*d_v)  # moment not less than Vu dv
N_u := -P_u.sh  # axial force, tension positive
f_po := 0.7*f_pu  # locked-in strand stress parameter
F_long := M_u.v/d_v + 0.5*N_u + V_u.sh - A_ps.t*f_po  # numerator of Eq. 5.7.3.4.2-4
ε_s0 := F_long/(E_p*A_ps.t)  # longitudinal strain, Eq. 5.7.3.4.2-4
A_ct := A_g/2  # concrete on the flexural tension side
ε_s1 := F_long/(E_p*A_ps.t + E_c*A_ct)  # strain with Ec Act added (negative eps_s0)
ε_s := max(if(ε_s0 < 0, ε_s1, ε_s0), -0.0004)  # longitudinal strain used (not below -0.40E-3)
s_x := d_v  # crack spacing parameter
s_xe := min(80*in, max(12*in, s_x*1.38/((a_g + 0.63*in)/in)))  # equivalent crack spacing, Eq. 5.7.3.4.2-7
A_v := 2*spiral_wire.area  # spiral area crossing the shear plane (two legs)
A_v.min := 0.0316*λ_c*sqrt(f'_c/ksi)*ksi*b_v*spiral_pitch/f_y.spiral
# minimum transverse reinforcement, 5.7.2.5
β_v := if(A_v ≥ A_v.min, 4.8/(1 + 750*ε_s), 4.8/(1 + 750*ε_s)*51/(39 + s_xe/in))  # beta, Eq. 5.7.3.4.2-1 (Av >= Av,min) or -2
θ_v := (29 + 3500*ε_s)*deg  # crack angle, Eq. 5.7.3.4.2-3
V_c := 0.0316*β_v*λ_c*sqrt(f'_c/ksi)*ksi*b_v*d_v  # concrete shear resistance
V_s := A_v*f_y.spiral*d_v/(tan(θ_v)*spiral_pitch)  # spiral shear resistance
V_n := min(V_c + V_s, 0.25*f'_c*b_v*d_v)  # nominal shear resistance
V_r := ϕ_v*V_n  # factored shear resistance
DC_shear := V_u.sh/V_r  # shear D/C
## 12. Service I stresses (LRFD 5.9.2.3.2)
P_sc := P_u[4]  # axial load, compression-stress record
Mx_sc := M_2[4]  # moment M2
My_sc := M_3[4]  # moment M3
sig_c := f_pc.eff + P_sc/A_g + (|Mx_sc| + |My_sc|)/S_g  # corner compression after losses
sig_c.lim := 0.6*f'_c  # compression limit 0.60 phi_w f'c (solid)
DC_svc.c := sig_c/sig_c.lim  # Service I compression D/C
P_st := P_u[5]  # axial load, tension-stress record
Mx_st := M_2[5]  # moment M2
My_st := M_3[5]  # moment M3
sig_t := f_pc.eff + P_st/A_g - (|Mx_st| + |My_st|)/S_g  # corner stress on the tension side (negative = tension)
f_t.net := max(-sig_t, 0*ksi)  # net tensile stress
f_t.sev := min(0.3*ksi, 0.0948*λ_c*sqrt(f'_c/ksi)*ksi)  # severe corrosive limit
f_t.mod := min(0.6*ksi, 0.19*λ_c*sqrt(f'_c/ksi)*ksi)  # moderate limit
f_t.lim := if(environment == 3, f_t.sev, f_t.mod)  # tension limit: 0.19 sqrt(f'c) up to 0.6 ksi (0.0948, 0.3 ksi in Extremely Aggressive environments)
DC_svc.t := f_t.net/f_t.lim  # Service I tension D/C
## 13. Prestress, driving strength, minimum size
f_pc.min := 0.7*ksi  # minimum uniform prestress after losses, 5.12.9.4.3
DC_pre := f_pc.min/f_pc.eff  # effective prestress D/C
DC_fc := 5*ksi/f'_c  # driving strength 5.0 ksi / f'c, 5.12.9.4
D_min := if(environment == 3, max(min_size.policy, 18*in), min_size.policy)
# minimum square pile size, SDG Table 3.5.1-1
DC_size := D_min/D_pile  # minimum size D/C
# Pile-to-cap moment transfer (SDG 3.5.1.C) needs 48 in of embedment for the full bending capacity; the embedment here is 12 in, so the connection stays a PENDING item of the notebook.
## 14. Geotechnical resistance (SDG 3.5.13)
# SDG Eq. 3-1: Rn >= (Factored Design Load + Net Scour Resistance + Downdrag) / phi. The downdrag enters nominally; the minimum tip elevation, scour and test-pile length of the Pile Data Table come from the geotechnical handoff.
FDL_tons := FDL_fbmp/(2*kip)  # Factored Design Load, tons (strength head compression, without downdrag)
R_scour.net := R_scour.net.tons*2*kip  # net scour resistance
R_n.req := (FDL_fbmp + R_scour.net + DD)/ϕ_geo  # required nominal bearing resistance, SDG Eq. 3-1
NBR_tons := R_n.req/(2*kip)  # required nominal bearing resistance, tons (Pile Data Table column C)
R_drive.max := R_drive.tons*2*kip  # maximum pile driving resistance, SDG Table 3.5.13-1
DC_nbr := NBR_tons/R_drive.tons  # bearing resistance D/C against Table 3.5.13-1
## 15. Summary of checks
DC_axial =  # no stored result  # axial compression
DC_bi =  # no stored result  # axial + biaxial flexure, 5.6.4.5
DC_rs =  # no stored result  # axial + flexure, resultant axis
DC_shear =  # no stored result  # shear
DC_t =  # no stored result  # tension
DC_svc.c =  # no stored result  # Service I compression
DC_svc.t =  # no stored result  # Service I tension
DC_pre =  # no stored result  # effective prestress
DC_fc =  # no stored result  # driving strength
DC_size =  # no stored result  # minimum size
DC_sp =  # no stored result  # pile spacing
DC_nbr =  # no stored result  # bearing resistance vs Table 3.5.13-1
DC_m1 := max(DC_axial, DC_bi, DC_rs, DC_shear, DC_t)
DC_m2 := max(DC_m1, DC_svc.c, DC_svc.t, DC_pre, DC_fc, DC_size)
DC_max := max(DC_m2, DC_sp, DC_nbr)  # largest of the distilled ratios
Status := if(DC_max ≤ 1 + 10^-9, "PASS", "FAIL")
# distilled numerical checks only
# Figure 3 data: every distilled ratio in check order, split at the limit. A check on the other side of the limit is parked at check number -1, outside the plot.
DC_all := [DC_axial; DC_bi; DC_rs; DC_shear; DC_t; DC_svc.c; DC_svc.t; DC_pre; DC_fc; DC_size; DC_sp; DC_nbr]  # distilled ratios in check order
Limit := 1
j := 0 .. last(DC_all)
ymax := max(1.2, 1.1*max(DC_all))
x_ok[j] := if(DC_all[j] ≤ Limit, j + 1, -1)
y_ok[j] := if(DC_all[j] ≤ Limit, DC_all[j], 0)
x_ng[j] := if(DC_all[j] > Limit, j + 1, -1)
y_ng[j] := if(DC_all[j] > Limit, DC_all[j], 0)
CheckGood := augment(x_ok, y_ok)
CheckNoGood := augment(x_ng, y_ng)
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# Figure 3. Demand/capacity ratio of each distilled check (stems) against the limit (dashed line). It is a Mathcad plot of CheckGood and CheckNoGood, so it recalculates with the worksheet and a check turns red when its ratio passes 1.0.
# Check numbers: 1 axial compression; 2 axial + biaxial flexure, 5.6.4.5; 3 axial + flexure, resultant axis; 4 shear; 5 tension; 6 Service I compression; 7 Service I tension; 8 effective prestress; 9 driving strength; 10 minimum size; 11 pile spacing; 12 bearing resistance vs Table 3.5.13-1.
# The notebook lists 15 PENDING items; the distilled ratios below do not close them: Axial compression · maximum Pu / φPn,max; Axial + biaxial flexure · LRFD Eq. 5.6.4.5-3; Axial + flexure · resultant bending axis (strain compatibility); Shear · general procedure; Service I concrete tension; Minimum square pile size (Table 3.5.1-1); Pile-to-cap moment transfer (embedment below 48 in); Pile Data Table completeness (SDM 11.4); Environment classification; Pile-to-cap connection (12 in embedment); Downdrag source documented; FBMP export current; Minimum tip elevation; Scour resistance and elevations; Drivability.
# FB-MultiPier reports a largest model D/C of 0.46 at combo 2 STRENGTH-III · pile 4 · element 12J · EL 18.60 ft. The distilled Status covers the recomputed numerical checks only; it is not design acceptance.
# Notebook values for comparison, D/C: axial compression 0.137; axial + biaxial flexure, 5.6.4.5 0.474; axial + flexure, resultant axis 0.398; shear 0.074; tension 0.000; Service I compression 0.550; Service I tension 0.000; effective prestress 0.675; driving strength 0.769; minimum size 0.778; pile spacing 1.000; bearing resistance vs Table 3.5.13-1 0.300; largest 1.000.
