# Title: Pier Pile Design
# Description: Written by pile_design/mathcad.py (scripts/build_pile_mathcad.py) from the pile_design package e17a271b8e25; FBMP Pier_Fixed.XML (SHA-256 bb73e6ada6cf35ebb80b512cee315075807fc8ccab7878406d81ff381ae40fe7)
## Pier Pile Design
# Project: D2 I-95 Pedestrian Bridge.
# Distilled from the pile design notebook (package e17a271b8e25), case "Pier piles: 20 in steel pipe, FBMP fixed run". Same inputs, equations and load combinations as the notebook; results should match its exported report.
# Codes: AASHTO LRFD Bridge Design Specifications, 10th edition (2024): 6.5.4.2, 6.8.2.1, 6.9.2.2.1, 6.9.4.1, 6.12.1.2.3b, 6.12.2.2.3, 10.7.3.13; FDOT Structures Design Guidelines (SDG) 3.5 and Structures Detailing Manual (SDM) 11.4, January 2026; Specification 455-8.2 (Table 962-11).
# Status: All numerical checks pass (largest ratio 1.00) · 16 pending item(s) remain. Inputs are highlighted yellow; values for the plans are boxed.
## 1. Design basis
# • FBMP source: Pier_Fixed.XML, SHA-256 bb73e6ada6cf35ebb80b512cee315075807fc8ccab7878406d81ff381ae40fe7 (registered export PIER-XML). 4 piles at 5 ft; cutoff elevation 41.7717 ft, ground 26.05 ft.
# • Pile: ASTM A252 / API 5L pipe 20 in x 0.48 in wall, Fy = 45 ksi (noncomposite).
# • Downdrag 0 tons per pile is a drag load DR: gamma_DR = 1.1 (strength) and 1 (Service I) in the structural demands (LRFD Table 3.4.1-1, 10.7.3.7); it is excluded from the Factored Design Load and added nominally to the required bearing resistance (SDG Eq. 3-1, phi = 0.75).
# • Every worksheet equation is parsed once and evaluated by the generator with unit checking; the build compares each result with the notebook before the file is written. Governing records, the notebook angles and the neutral-axis depth c_gov are inputs read from the notebook.
# • Second-order effects come from the FBMP P-delta analysis; the LRFD column check here uses K(Lu + Lf). Composite (filled) pipe is out of scope.
## 2. Inputs
## Pile and layout
D_pile := 20*in
# Pile size (square side, or pipe outside diameter)
N_pile := 4  # Piles in the support
S_pile := 5*ft
# Center-to-center pile spacing
EL_cutoff := 41.771667*ft  # Pile cutoff elevation (FBMP pile head)
EL_ground := 26.05*ft
# Ground elevation (top of soil layer 1)
L_unsupported := 15.721667*ft  # Length above ground (cutoff - ground); editable
embed_cap := 12*in  # Pile embedment into the cap
## Loads and geotechnical
DD_tons := 0
# Downdrag (drag load DR) per pile, short tons [pending confirmation]
γ_DR.str := 1.1  # Drag-load factor, strength limit states (structural)
γ_DR.ser := 1
# Drag-load factor, Service I
ϕ_geo := 0.75  # Geotechnical resistance factor (compression, Davisson)
R_scour.net.tons := 0
# Net scour resistance, short tons [pending confirmation]
R_scour.total.tons := 0  # Total scour resistance, short tons [pending confirmation]
K_eff := 1
# Effective length factor K
soil_type := 0  # Soil for depth to fixity (0 sand, 1 clay) [pending confirmation]
n_h := 0.556*ksi/ft
# Rate of increase of soil modulus, sand
S_u := 1*kip/ft^2  # Undrained shear strength, clay (used only for soil type 1) [pending confirmation]
## Environment and policy
environment := 2  # Environment classification [pending confirmation]
## Steel pipe pile
D_out := 20*in
# Pipe outside diameter
t_wall := 0.48*in  # Pipe wall thickness (nominal)
t_corr := 0*in
# Corrosion allowance deducted from the wall [pending confirmation]
Fy := 45*ksi  # Steel yield strength [pending confirmation]
E_s := 29000*ksi
# Steel modulus
ϕ_c.axial := 0.7  # Axial compression resistance factor, pipe (good driving, no tip)
ϕ_c.comb := 0.8
# Axial resistance factor, combined axial and flexure
ϕ_f := 1  # Flexure resistance factor
ϕ_v.steel := 1
# Shear resistance factor, steel
ϕ_y := 0.95  # Tension yielding resistance factor
L_v := 15.721667*ft  # Shear span Lv (distance from maximum to zero shear) [pending confirmation]
## 3. Demands from the FBMP export
# Governing records of Pier_Fixed.XML for each check (index g). FBMP axial force is converted to compression positive. The drag load DR = DD is added to the axial force at every station (LRFD Table 3.4.1-1, 10.7.3.7): gamma_DR for the limit state of the record. Downdrag is not in the Factored Design Load.
# • Axial: combo 2 STRENGTH-III · pile 4 · element 13J · EL 16.55 ft.
# • Combined: combo 2 STRENGTH-III · pile 4 · element 13J · EL 16.55 ft.
# • Shear: combo 2 STRENGTH-III · pile 4 · element 1I · EL 41.77 ft (+1 tied).
# • Tension: combo 3 STRENGTH-III · pile 1 · element 12I · EL 22.88 ft.
r := 0 .. 3
Rec := transpose(["Axial", "Combined", "Shear", "Tension"])
P_fbmp := transpose([265.58, 265.58, 120.41, -11.81])*kip  # FBMP axial force at the record, compression positive
M_2 := transpose([-128.88, -128.88, 25.6, -0.08])*kip*ft  # FBMP moment M2, signed
M_3 := transpose([-36.63, -36.63, -13.82, -4.66])*kip*ft  # FBMP moment M3, signed
M_res := transpose([133.98437, 133.98437, 29.092136, 4.660687])*kip*ft  # resultant moment of the record
V_res := transpose([12.895026, 12.895026, 18.699703, 2.900276])*kip  # resultant shear of the record
FDL_fbmp := 224.63*kip  # Factored Design Load: maximum strength head compression, FBMP (no downdrag)
T_u := 11.81*kip  # maximum strength uplift anywhere along the pile, FBMP
DD := DD_tons*2*kip  # downdrag (drag load DR) per pile, nominal
DR_str := γ_DR.str*DD  # drag load, strength limit states
DR_ser := γ_DR.ser*DD  # drag load, Service I
γ_g := transpose([γ_DR.str, γ_DR.str, γ_DR.str, γ_DR.str])  # drag-load factor of each record
P_u[r] := P_fbmp[r] + γ_g[r]*DD  # factored axial load incl. drag load
# Columns, left to right: record; FBMP axial force; P_u incl. drag load; resultant moment; resultant shear.
Rec =  # no stored result
P_fbmp =  # no stored result
P_u =  # no stored result
M_res =  # no stored result
V_res =  # no stored result
## 4. Pile spacing
S_min := 3*D_pile  # minimum center-to-center spacing, 3.0 diameters (SDG 3.5.4)
s_over.D := S_pile/D_pile  # provided spacing in pile diameters
DC_sp := S_min/S_pile  # spacing D/C
## 5. Pipe section
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# Figure 1. Pipe cross-section: outside diameter and design wall thickness after the corrosion allowance.
t_des := t_wall - t_corr  # design wall thickness after corrosion allowance
D_i := D_out - 2*t_des  # inside diameter
A_g := 0.785398163397*(D_out^2 - D_i^2)  # gross area
I_g := 0.0490873852123*(D_out^4 - D_i^4)  # moment of inertia
S_g := I_g/(D_out/2)  # elastic section modulus
Z_p := (D_out^3 - D_i^3)/6  # plastic section modulus
r_g := sqrt(I_g/A_g)  # radius of gyration
D_t := D_out/t_des  # diameter-to-thickness ratio
## 6. Axial compression (LRFD 6.9.4.1, 6.9.4.2.2c, 10.7.3.13.4)
# Fully embedded piles take no buckling reduction beyond the effective length K (Lu + Lf), Lf the depth to fixity (C10.7.3.13.4). The FBMP P-delta analysis is the preferred second-order check; this is the LRFD column check.
lam_r := 0.11*E_s/Fy  # nonslender limit 0.11 E/Fy
A_eff := if(D_t ≤ lam_r, A_g, (0.038*E_s/(Fy*D_t) + 2/3)*A_g)  # effective area
P_o := Fy*A_eff  # squash load
E_soil := 0.465*S_u/(kip/ft^2)*ksi  # clay soil modulus 0.465 Su (used for clay only)
L_fix := if(soil_type == 1, 1.4*(E_s*I_g/E_soil)^0.25, 1.8*(E_s*I_g/n_h)^0.2)
# depth to fixity below ground
KL := K_eff*(L_unsupported + L_fix)  # effective length
KL_r := KL/r_g  # slenderness ratio
P_e := 9.86960440109*E_s*A_g/KL_r^2  # elastic buckling load
Pe_Po := P_e/P_o  # Pe / Po
P_n := if(Pe_Po ≥ 0.44, 0.658^(P_o/P_e)*P_o, 0.877*P_e)  # nominal axial resistance, 6.9.4.1.1
P_r.axial := ϕ_c.axial*P_n  # factored axial resistance
P_r.comb := ϕ_c.comb*P_n  # factored axial resistance, combined loading
P_u.axial := P_u[0]  # largest factored compression incl. drag load
DC_slender := D_t/(0.45*E_s/Fy)  # D/t against the 0.45 E/Fy limit
DC_klr := KL_r/120  # KL/r against 120, 6.9.3
DC_axial := P_u.axial/P_r.axial  # axial compression D/C
## 7. Flexure (LRFD 6.12.2.2.3)
lam_p := 0.07*E_s/Fy  # compact limit 0.07 E/Fy
lam_nc := 0.31*E_s/Fy  # noncompact limit 0.31 E/Fy
M_p := Fy*Z_p  # plastic moment
M_nc := (0.021*E_s/D_t + Fy)*S_g  # noncompact: (0.021 E/(D/t) + Fy) S
M_sl := 0.33*E_s/D_t*S_g  # slender: 0.33 E/(D/t) S
M_n := if(D_t ≤ lam_p, M_p, min(M_p, if(D_t ≤ lam_nc, M_nc, M_sl)))
# nominal flexural resistance
M_r := ϕ_f*M_n  # factored flexural resistance
## 8. Combined axial load and flexure (LRFD 6.9.2.2.1) and tension (6.8.2.1)
# Governing combined record (index 1). The resultant moment is checked against Mr (axisymmetric section). A net uplift uses the tension resistance in place of the compression resistance.
P_u.comb := P_u[1]  # factored axial load, compression positive
M_u.comb := M_res[1]  # resultant moment
P_r.t := ϕ_y*Fy*A_g  # factored tension resistance, yielding of the gross section
DC_t := T_u/P_r.t  # tension D/C, maximum strength uplift
P_abs := |P_u.comb|  # magnitude of the axial force
P_rc := if(P_u.comb ≥ 0*kip, P_r.comb, P_r.t)  # matching axial resistance
Pu_Pr := P_abs/P_rc  # Pu / Pr
DC_comb := if(Pu_Pr ≥ 0.2, Pu_Pr + 8/9*M_u.comb/M_r, Pu_Pr/2 + M_u.comb/M_r)
# interaction, Eq. 6.9.2.2.1-1 (Pu/Pr >= 0.2) or -2
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# Figure 2. Combined axial load and flexure: the bilinear envelope of LRFD 6.9.2.2.1 (compression and tension) with the governing records. The picture is static; the equations above are live.
## 9. Shear (LRFD 6.12.1.2.3b)
V_u.sh := V_res[2]  # resultant shear of the governing record
F_cr1 := 1.6*E_s/(sqrt(L_v/D_out)*D_t^1.25)  # shear buckling stress, Eq. 6.12.1.2.3b-2
F_cr2 := 0.78*E_s/D_t^1.5  # shear buckling stress, Eq. 6.12.1.2.3b-3
F_cr := min(max(F_cr1, F_cr2), 0.58*Fy)  # flexural shear buckling resistance
V_n := 0.5*F_cr*A_g  # nominal shear resistance
V_r := ϕ_v.steel*V_n  # factored shear resistance
DC_shear := V_u.sh/V_r  # shear D/C
## 10. Geotechnical resistance (SDG 3.5.13)
# SDG Eq. 3-1: Rn >= (Factored Design Load + Net Scour Resistance + Downdrag) / phi. The downdrag enters nominally; the minimum tip elevation, scour and test-pile length of the Pile Data Table come from the geotechnical handoff.
FDL_tons := FDL_fbmp/(2*kip)  # Factored Design Load, tons (strength head compression, without downdrag)
R_scour.net := R_scour.net.tons*2*kip  # net scour resistance
R_n.req := (FDL_fbmp + R_scour.net + DD)/ϕ_geo  # required nominal bearing resistance, SDG Eq. 3-1
NBR_tons := R_n.req/(2*kip)  # required nominal bearing resistance, tons (Pile Data Table column C)
## 11. Summary of checks
DC_slender =  # no stored result  # local buckling D/t
DC_klr =  # no stored result  # KL/r
DC_axial =  # no stored result  # axial compression
DC_comb =  # no stored result  # axial + flexure, 6.9.2.2.1
DC_shear =  # no stored result  # shear
DC_t =  # no stored result  # tension
DC_sp =  # no stored result  # pile spacing
DC_m1 := max(DC_slender, DC_klr, DC_axial, DC_comb, DC_shear)
DC_max := max(DC_m1, DC_t, DC_sp)  # largest of the distilled ratios
Status := if(DC_max ≤ 1 + 10^-9, "PASS", "FAIL")
# distilled numerical checks only
# Figure 3 data: every distilled ratio in check order, split at the limit. A check on the other side of the limit is parked at check number -1, outside the plot.
DC_all := [DC_slender; DC_klr; DC_axial; DC_comb; DC_shear; DC_t; DC_sp]  # distilled ratios in check order
Limit := 1
j := 0 .. last(DC_all)
ymax := max(1.2, 1.1*max(DC_all))
x_ok[j] := if(DC_all[j] ≤ Limit, j + 1, -1)
y_ok[j] := if(DC_all[j] ≤ Limit, DC_all[j], 0)
x_ng[j] := if(DC_all[j] > Limit, j + 1, -1)
y_ng[j] := if(DC_all[j] > Limit, DC_all[j], 0)
CheckGood := augment(x_ok, y_ok)
CheckNoGood := augment(x_ng, y_ng)
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# Figure 3. Demand/capacity ratio of each distilled check (stems) against the limit (dashed line). It is a Mathcad plot of CheckGood and CheckNoGood, so it recalculates with the worksheet and a check turns red when its ratio passes 1.0.
# Check numbers: 1 local buckling D/t; 2 KL/r; 3 axial compression; 4 axial + flexure, 6.9.2.2.1; 5 shear; 6 tension; 7 pile spacing.
# The notebook lists 16 PENDING items; the distilled ratios below do not close them: Local buckling class · nonslender (D/t vs 0.11 E/Fy); Slenderness KL/r ≤ 120; Axial compression · maximum Pu / φc Pn; Combined axial load and flexure · Eq. 6.9.2.2.1 (-1); Shear · round tube; Tension · maximum strength uplift; Pile Data Table completeness (SDM 11.4); Steel grade and Fy reconciled; Corrosion allowance; Environment classification; Pile-to-cap connection (12 in embedment); Downdrag source documented; FBMP export current; Minimum tip elevation; Scour resistance and elevations; Drivability.
# FB-MultiPier reports a largest model D/C of 0.29 at combo 2 STRENGTH-III · pile 4 · element 13J · EL 16.55 ft. The distilled Status covers the recomputed numerical checks only; it is not design acceptance.
# Notebook values for comparison, D/C: local buckling D/t 0.144; KL/r 0.361; axial compression 0.324; axial + flexure, 6.9.2.2.1 0.457; shear 0.049; tension 0.009; pile spacing 1.000; largest 1.000.
